// COMSOL Multiphysics 6.4.0.378 model "comsol_Model.mph"
// Outline of the model tree

Parameters
  Hex_w_0 = 600[um]
  Hex_d_0 = 8000[um]
  Hex_h_0 = 30[um]
  Hex_x_0 = 9800[um]
  Hex_y_0 = 270[um]
  Hex_z_0 = 0[um]
  Hex_move_x_0 = 0[um]
  Hex_move_y_0 = 0[um]
  Hex_move_z_0 = 1000[um]
  Hex_rotate_x_0 = 0[deg]
  b_0 = 200[um]
  Hex_rotate180_x_0 = -0[deg]
  Hex_rotate_z_0 = -0[deg]
  Hex_radius_0 = 34[um]
  Hex_height1_0 = 15[um]
  Hex_height2_0 = 20[um]
  Hex_distance_0 = 120[um]
  sigma_per_0 = 8.703000e-04[S/m]  // Perineurium conductivity
  sigma_epi_0 = 1/6.300000e+00[ohm*m]  // Epineurium conductivity
  sigma_end_tran_0 = 1.67000e-01[S/m]  // Endoneurium conductivity (transverse)
  sigma_end_long_0 = 1/1.750000e+00[ohm*m]  // Endoneurium conductivity (longitudinal)
  I_stim_0 = 1.000000e-03[mA]  // Stimulation current
  sigma_envir_tran_0 = 4.3400000e-01[S/m]
  sigma_envir_long_0 = 4.3400000e-01[S/m]
  Nerve_length_0 = 20020[um]
  Nerve_height_0 = 50000[um]
  Nerve_depth_0 = 50000[um]

Variables
  var1 "Variables 1"

Geometry
  geom1 "Geometry 1" (3D, length unit µm)
    blk1: Block "Hex electrode substrate_Elec1" | size = {Hex_w_0, Hex_d_0, Hex_h_0}; base = center; pos = {Hex_x_0, 0, 0}
    cyl1: Cylinder "Hex_mid_Elec1"
      r = Hex_radius_0
      h = Hex_height1_0
      pos = {Hex_x_0, Hex_y_0, -(Hex_height2_0-Hex_height1_0)}
    cyl2: Cylinder "Hex_return_1_Elec1"
      r = Hex_radius_0
      h = Hex_height1_0
      pos = {Hex_x_0+Hex_distance_0, Hex_y_0, -(Hex_height2_0-Hex_height1_0)}
    cyl3: Cylinder "Hex_return_2_Elec1"
      r = Hex_radius_0
      h = Hex_height1_0
      pos = {Hex_x_0-Hex_distance_0, Hex_y_0, -(Hex_height2_0-Hex_height1_0)}
    cyl4: Cylinder "Hex_return_3_Elec1"
      r = Hex_radius_0
      h = Hex_height1_0
      pos = {Hex_x_0+Hex_distance_0*cos(pi/3), Hex_distance_0*sin(pi/3)+Hex_y_0, -(Hex_height2_0-Hex_height1_0)}
    cyl5: Cylinder "Hex_return_4_Elec1"
      r = Hex_radius_0
      h = Hex_height1_0
      pos = {Hex_x_0-Hex_distance_0*cos(pi/3), Hex_distance_0*sin(pi/3)+Hex_y_0, -(Hex_height2_0-Hex_height1_0)}
    cyl6: Cylinder "Hex_return_5_Elec1"
      r = Hex_radius_0
      h = Hex_height1_0
      pos = {Hex_x_0+Hex_distance_0*cos(pi/3), -Hex_distance_0*sin(pi/3)+Hex_y_0, -(Hex_height2_0-Hex_height1_0)}
    cyl7: Cylinder "Hex_return_6_Elec1"
      r = Hex_radius_0
      h = Hex_height1_0
      pos = {Hex_x_0-Hex_distance_0*cos(pi/3), -Hex_distance_0*sin(pi/3)+Hex_y_0, -(Hex_height2_0-Hex_height1_0)}
    cyl8: Cylinder "Hex_mid_remove_Elec1"
      r = Hex_radius_0
      h = Hex_height2_0
      pos = {Hex_x_0, Hex_y_0, -(Hex_height2_0-Hex_height1_0)}
    cyl9: Cylinder "Hex_return_1_remove_Elec1"
      r = Hex_radius_0
      h = Hex_height2_0
      pos = {Hex_x_0+Hex_distance_0, Hex_y_0, -(Hex_height2_0-Hex_height1_0)}
    cyl10: Cylinder "Hex_return_2_remove_Elec1"
      r = Hex_radius_0
      h = Hex_height2_0
      pos = {Hex_x_0-Hex_distance_0, Hex_y_0, -(Hex_height2_0-Hex_height1_0)}
    cyl11: Cylinder "Hex_return_3_remove_Elec1"
      r = Hex_radius_0
      h = Hex_height2_0
      pos = {Hex_x_0+Hex_distance_0*cos(pi/3), Hex_distance_0*sin(pi/3)+Hex_y_0, -(Hex_height2_0-Hex_height1_0)}
    cyl12: Cylinder "Hex_return_4_remove_Elec1"
      r = Hex_radius_0
      h = Hex_height2_0
      pos = {Hex_x_0-Hex_distance_0*cos(pi/3), Hex_distance_0*sin(pi/3)+Hex_y_0, -(Hex_height2_0-Hex_height1_0)}
    cyl13: Cylinder "Hex_return_5_remove_Elec1"
      r = Hex_radius_0
      h = Hex_height2_0
      pos = {Hex_x_0+Hex_distance_0*cos(pi/3), -Hex_distance_0*sin(pi/3)+Hex_y_0, -(Hex_height2_0-Hex_height1_0)}
    cyl14: Cylinder "Hex_return_6_remove_Elec1"
      r = Hex_radius_0
      h = Hex_height2_0
      pos = {Hex_x_0-Hex_distance_0*cos(pi/3), -Hex_distance_0*sin(pi/3)+Hex_y_0, -(Hex_height2_0-Hex_height1_0)}
    dif1: Difference | input = blk1; input2 = cyl10, cyl11, cyl12, cyl13, cyl14, cyl8, cyl9
    mov1: Move "Move_substrate_x_100000_Elec1"
      input = dif1
      displx = 100000
      disply = 0
      displz = 0
      indexattrtag = mov1.index
    mov2: Move "Move_active electrode_x_200000_Elec1"
      input = cyl1
      displx = 200000
      disply = 0
      displz = 0
      indexattrtag = mov2.index
    boxsel1: BoxSelection "Selec_boundary_ruturn electrode_Elec1"
      entitydim = 2
      xmin = Hex_x_0-Hex_w_0
      xmax = Hex_x_0+Hex_w_0
      ymin = -Hex_d_0/2
      ymax = Hex_d_0/2
      zmin = Hex_height1_0-(Hex_height2_0)
      zmax = Hex_height1_0-(Hex_height2_0)
      condition = allvertices
    boxsel5: BoxSelection "Selec_boundary_active electrode_Elec1"
      entitydim = 2
      xmin = Hex_x_0-Hex_w_0+200000
      xmax = Hex_x_0+Hex_w_0+200000
      ymin = -Hex_d_0/2
      ymax = Hex_d_0/2
      zmin = Hex_height1_0-(Hex_height2_0)
      zmax = Hex_height1_0-(Hex_height2_0)
      condition = allvertices
    mov3: Move "Move_active electrode_x_-200000_Elec1"
      input = mov2
      displx = -200000
      disply = 0
      displz = 0
      indexattrtag = mov3.index
    boxsel2: BoxSelection "Selec_domain_all electrode_Elec1"
      entitydim = 3
      xmin = Hex_x_0-Hex_w_0
      xmax = Hex_x_0+Hex_w_0
      ymin = -Hex_d_0/2
      ymax = Hex_d_0/2
      zmin = -10
      zmax = 10
      condition = allvertices
    boxsel3: BoxSelection "Selec_domain_substrate_Elec1"
      entitydim = 3
      xmin = Hex_x_0-Hex_w_0+100000
      xmax = Hex_x_0+Hex_w_0+100000
      ymin = -Hex_d_0/2
      ymax = Hex_d_0/2
      zmin = -10
      zmax = 10
    mov23: Move "Move_Electrode_1_z_100000_Elec1"
      input = mov3
      displx = 0
      disply = 0
      displz = 100000
      indexattrtag = mov23.index
    mov24: Move "Move_Electrode_2_z_200000_Elec1"
      input = cyl3
      displx = 0
      disply = 0
      displz = 200000
      indexattrtag = mov24.index
    mov25: Move "Move_Electrode_3_z_300000_Elec1"
      input = cyl5
      displx = 0
      disply = 0
      displz = 300000
      indexattrtag = mov25.index
    mov26: Move "Move_Electrode_4_z_400000_Elec1"
      input = cyl4
      displx = 0
      disply = 0
      displz = 400000
      indexattrtag = mov26.index
    mov27: Move "Move_Electrode_5_z_500000_Elec1"
      input = cyl2
      displx = 0
      disply = 0
      displz = 500000
      indexattrtag = mov27.index
    mov28: Move "Move_Electrode_6_z_600000_Elec1"
      input = cyl6
      displx = 0
      disply = 0
      displz = 600000
      indexattrtag = mov28.index
    mov29: Move "Move_Electrode_7_z_700000_Elec1"
      input = cyl7
      displx = 0
      disply = 0
      displz = 700000
      indexattrtag = mov29.index
    boxsel6: BoxSelection "Selec_boundary_Electrode_1_Elec1"
      entitydim = 2
      xmin = Hex_x_0-Hex_w_0
      xmax = Hex_x_0+Hex_w_0
      ymin = -Hex_d_0/2
      ymax = Hex_d_0/2
      zmin = Hex_height1_0-(Hex_height2_0)+100000
      zmax = Hex_height1_0-(Hex_height2_0)+100000
      condition = allvertices
    boxsel7: BoxSelection "Selec_boundary_Electrode_2_Elec1"
      entitydim = 2
      xmin = Hex_x_0-Hex_w_0
      xmax = Hex_x_0+Hex_w_0
      ymin = -Hex_d_0/2
      ymax = Hex_d_0/2
      zmin = Hex_height1_0-(Hex_height2_0)+200000
      zmax = Hex_height1_0-(Hex_height2_0)+200000
      condition = allvertices
    boxsel8: BoxSelection "Selec_boundary_Electrode_3_Elec1"
      entitydim = 2
      xmin = Hex_x_0-Hex_w_0
      xmax = Hex_x_0+Hex_w_0
      ymin = -Hex_d_0/2
      ymax = Hex_d_0/2
      zmin = Hex_height1_0-(Hex_height2_0)+300000
      zmax = Hex_height1_0-(Hex_height2_0)+300000
      condition = allvertices
    boxsel9: BoxSelection "Selec_boundary_Electrode_4_Elec1"
      entitydim = 2
      xmin = Hex_x_0-Hex_w_0
      xmax = Hex_x_0+Hex_w_0
      ymin = -Hex_d_0/2
      ymax = Hex_d_0/2
      zmin = Hex_height1_0-(Hex_height2_0)+400000
      zmax = Hex_height1_0-(Hex_height2_0)+400000
      condition = allvertices
    boxsel10: BoxSelection "Selec_boundary_Electrode_5_Elec1"
      entitydim = 2
      xmin = Hex_x_0-Hex_w_0
      xmax = Hex_x_0+Hex_w_0
      ymin = -Hex_d_0/2
      ymax = Hex_d_0/2
      zmin = Hex_height1_0-(Hex_height2_0)+500000
      zmax = Hex_height1_0-(Hex_height2_0)+500000
      condition = allvertices
    boxsel11: BoxSelection "Selec_boundary_Electrode_6_Elec1"
      entitydim = 2
      xmin = Hex_x_0-Hex_w_0
      xmax = Hex_x_0+Hex_w_0
      ymin = -Hex_d_0/2
      ymax = Hex_d_0/2
      zmin = Hex_height1_0-(Hex_height2_0)+600000
      zmax = Hex_height1_0-(Hex_height2_0)+600000
      condition = allvertices
    boxsel12: BoxSelection "Selec_boundary_Electrode_7_Elec1"
      entitydim = 2
      xmin = Hex_x_0-Hex_w_0
      xmax = Hex_x_0+Hex_w_0
      ymin = -Hex_d_0/2
      ymax = Hex_d_0/2
      zmin = Hex_height1_0-(Hex_height2_0)+700000
      zmax = Hex_height1_0-(Hex_height2_0)+700000
      condition = allvertices
    mov30: Move "Move_Electrode_1_z_-100000_Elec1"
      input = mov23
      displx = 0
      disply = 0
      displz = -100000
      indexattrtag = mov30.index
    mov31: Move "Move_Electrode_2_z_-200000_Elec1"
      input = mov24
      displx = 0
      disply = 0
      displz = -200000
      indexattrtag = mov31.index
    mov32: Move "Move_Electrode_3_z_-300000_Elec1"
      input = mov25
      displx = 0
      disply = 0
      displz = -300000
      indexattrtag = mov32.index
    mov33: Move "Move_Electrode_4_z_-400000_Elec1"
      input = mov26
      displx = 0
      disply = 0
      displz = -400000
      indexattrtag = mov33.index
    mov34: Move "Move_Electrode_5_z_-500000_Elec1"
      input = mov27
      displx = 0
      disply = 0
      displz = -500000
      indexattrtag = mov34.index
    mov35: Move "Move_Electrode_6_z_-600000_Elec1"
      input = mov28
      displx = 0
      disply = 0
      displz = -600000
      indexattrtag = mov35.index
    mov36: Move "Move_Electrode_7_z_-700000_Elec1"
      input = mov29
      displx = 0
      disply = 0
      displz = -700000
      indexattrtag = mov36.index
    mov4: Move "Move_substrate_-100000_Elec1"
      input = mov1
      displx = -100000
      disply = 0
      displz = 0
      indexattrtag = mov4.index
    wp1: WorkPlane "Layer 0 tissue_Elec1" | quickplane = zx; quicky = -Hex_d_0/2; unite = on
      r2: Rectangle | size = {Hex_h_0+5[um], Hex_w_0+5[um]}; base = center; pos = {100000, Hex_x_0}
      fil2: Fillet | point = r2(1) points 1-4; radius = 5
    ext1: Extrude | workplane = wp1; input = wp1; distance = Hex_d_0
    cylsel4: CylinderSelection "Selec_domain_layer 0_Elec1"
      entitydim = 3
      top = 1
      bottom = -1
      pos = {Hex_x_0, 0, 100000}
    mov5: Move "Move_0 layer tissue_z_-100000_Elec1"
      input = ext1
      displx = 0
      disply = 0
      displz = -100000
      indexattrtag = mov5.index
    mov7: Move "Move_all_Hex and scar tissue_z_20000_Elec1"
      input = mov4, mov5, mov30, mov31, mov32, mov33, mov34, mov35, mov36
      displx = 0
      disply = 0
      displz = 20000
      indexattrtag = mov7.index
    blk2: Block "Environment_Elec1"
      size = {Nerve_length_0, Nerve_depth_0, Nerve_height_0}
      base = center
      pos = {Nerve_length_0/2, 0, 0}
    mov13: Move "Move_all_Hex and scar tissue_z_userdefined_Elec1"
      input = mov7
      displx = 0
      disply = 0
      displz = Hex_move_z_0
      indexattrtag = mov13.index
    rot2: Rotate "Rotate_all_Hex and scar tissue_z_userdefined_Elec1"
      input = mov13
      rot = Hex_rotate_z_0
      pos = {Hex_x_0, 0, 0}
      indexattrtag = rot2.index
    rot1: Rotate "Rotate_all_Hex and scar tissue_x_userdefined_Elec1"
      input = rot2
      axistype = x
      rot = Hex_rotate_x_0
      pos = {0, 0, 20000+Hex_move_z_0}
      indexattrtag = rot1.index
    mov8: Move "Move_Emvironment_z_400000_Elec1"
      input = blk2
      displx = 0
      disply = 0
      displz = 400000
      indexattrtag = mov8.index
    copy1: Copy | input = rot1; keep = on; displx = 0; disply = 0; displz = 0; indexattrtag = copy1.index
    copy2: Copy | input = rot1; keep = on; displx = 0; disply = 0; displz = 0; indexattrtag = copy2.index
    copy3: Copy | input = rot1; keep = on; displx = 0; disply = 0; displz = 0; indexattrtag = copy3.index
    copy4: Copy | input = rot1; keep = on; displx = 0; disply = 0; displz = 0; indexattrtag = copy4.index
    wp5: WorkPlane "Nerve_Elec1" | quickplane = yz; unite = on
      e5: Ellipse "WpEllipse_Nerve_Elec1" | semiaxes = {620, 500}
    ext5: Extrude
      workplane = wp5
      input = wp5
      distance = {9150, 9350, 10250, 10450, 20020}
      crossfaces = off
      scale = {{1, 1}, {1, 1}, {1, 1}, {1, 1}, {1, 1}}
      displ = {{0, 0}, {0, 0}, {0, 0}, {0, 0}, {0, 0}}
      twist = {0, 0, 0, 0, 0}
      baseid = {0, 1, 3, 4, 5, 6, 7, 8, 9, 10, 2}
    cylsel5: CylinderSelection "Selec_domain_Nerve_Elec1" | entitydim = 3; axistype = x
    cylsel6: CylinderSelection "Selec_boundary_Nerve_insulation1_Elec1"
      entitydim = 2
      r = 1
      top = 1
      bottom = -1
      axistype = x
    cylsel7: CylinderSelection "Selec_boundary_Nerve_insulation2_Elec1"
      entitydim = 2
      r = 1
      top = 20021
      bottom = 20019
      axistype = x
    mov15: Move "Move_Nerve_z_60000_Elec1"
      input = ext5
      displx = 0
      disply = 0
      displz = 60000
      indexattrtag = mov15.index
    wp21: WorkPlane "Fascicle_1_crosssection_1_Elec1" | quickplane = yz; unite = on
      e110: Ellipse "WpEllipse_Fascicle_1_crosssection_1_Elec1" | semiaxes = {319, 380}; pos = {246, 9}
      pol110: Polygon "WpPolygon_Fascicle_1_crosssection_1_Elec1"
        source = table
        table = {{246, 9.1}, {246.1, 9.1}, {246.1, 9}, {246, 9}}
      uni110: Union "WpUnion_Fascicle_1_crosssection_1_Elec1" | input = e110, pol110; intbnd = off; edge = all
    ls21: LineSegment "Line_Fascicle_1_crosssection_1_Elec1"
      specify1 = coord
      coord1 = {0, 246, 9}
      specify2 = coord
      coord2 = {9350, 246, 9}
    swe21: Sweep "Sweep_Fascicle_1_crosssection_1_Elec1"
      enttosweep = wp21.uni110 boundaries 1
      edge = ls21(1) edges 1
      manualdir = off
      keep = off
      includefinal = off
      diredge = ls21(1) edges 1
    wp22: WorkPlane "Fascicle_1_crosssection_2_Elec1" | quickplane = yz; quickx = 9350; unite = on
      e120: Ellipse "WpEllipse_Fascicle_1_crosssection_2_Elec1" | semiaxes = {319, 380}; pos = {246, 9}
      pol120: Polygon "WpPolygon_Fascicle_1_crosssection_2_Elec1"
        source = table
        table = {{246, 9.1}, {246.1, 9.1}, {246.1, 9}, {246, 9}}
      uni120: Union "WpUnion_Fascicle_1_crosssection_2_Elec1" | input = e120, pol120; intbnd = off; edge = all
    ls22: LineSegment "Line_Fascicle_1_crosssection_2_Elec1"
      specify1 = coord
      coord1 = {9350, 246, 9}
      specify2 = coord
      coord2 = {9400, 246, 9}
    swe22: Sweep "Sweep_Fascicle_1_crosssection_2_Elec1"
      enttosweep = wp22.uni120 boundaries 1
      edge = ls22(1) edges 1
      manualdir = off
      keep = off
      includefinal = off
      diredge = ls22(1) edges 1
    wp23: WorkPlane "Fascicle_1_crosssection_3_Elec1" | quickplane = yz; quickx = 9400; unite = on
      e130: Ellipse "WpEllipse_Fascicle_1_crosssection_3_Elec1" | semiaxes = {319, 380}; pos = {246, 9}
      pol130: Polygon "WpPolygon_Fascicle_1_crosssection_3_Elec1"
        source = table
        table = {{246, 9.1}, {246.1, 9.1}, {246.1, 9}, {246, 9}}
      uni130: Union "WpUnion_Fascicle_1_crosssection_3_Elec1" | input = e130, pol130; intbnd = off; edge = all
    ls23: LineSegment "Line_Fascicle_1_crosssection_3_Elec1"
      specify1 = coord
      coord1 = {9400, 246, 9}
      specify2 = coord
      coord2 = {9450, 246, 9}
    swe23: Sweep "Sweep_Fascicle_1_crosssection_3_Elec1"
      enttosweep = wp23.uni130 boundaries 1
      edge = ls23(1) edges 1
      manualdir = off
      keep = off
      includefinal = off
      diredge = ls23(1) edges 1
    wp24: WorkPlane "Fascicle_1_crosssection_4_Elec1" | quickplane = yz; quickx = 9450; unite = on
      e140: Ellipse "WpEllipse_Fascicle_1_crosssection_4_Elec1" | semiaxes = {319, 380}; pos = {246, 9}
      pol140: Polygon "WpPolygon_Fascicle_1_crosssection_4_Elec1"
        source = table
        table = {{246, 9.1}, {246.1, 9.1}, {246.1, 9}, {246, 9}}
      uni140: Union "WpUnion_Fascicle_1_crosssection_4_Elec1" | input = e140, pol140; intbnd = off; edge = all
    ls24: LineSegment "Line_Fascicle_1_crosssection_4_Elec1"
      specify1 = coord
      coord1 = {9450, 246, 9}
      specify2 = coord
      coord2 = {9500, 246, 9}
    swe24: Sweep "Sweep_Fascicle_1_crosssection_4_Elec1"
      enttosweep = wp24.uni140 boundaries 1
      edge = ls24(1) edges 1
      manualdir = off
      keep = off
      includefinal = off
      diredge = ls24(1) edges 1
    wp25: WorkPlane "Fascicle_1_crosssection_5_Elec1" | quickplane = yz; quickx = 9500; unite = on
      e150: Ellipse "WpEllipse_Fascicle_1_crosssection_5_Elec1" | semiaxes = {319, 380}; pos = {246, 9}
      pol150: Polygon "WpPolygon_Fascicle_1_crosssection_5_Elec1"
        source = table
        table = {{246, 9.1}, {246.1, 9.1}, {246.1, 9}, {246, 9}}
      uni150: Union "WpUnion_Fascicle_1_crosssection_5_Elec1" | input = e150, pol150; intbnd = off; edge = all
    ls25: LineSegment "Line_Fascicle_1_crosssection_5_Elec1"
      specify1 = coord
      coord1 = {9500, 246, 9}
      specify2 = coord
      coord2 = {9550, 246, 9}
    swe25: Sweep "Sweep_Fascicle_1_crosssection_5_Elec1"
      enttosweep = wp25.uni150 boundaries 1
      edge = ls25(1) edges 1
      manualdir = off
      keep = off
      includefinal = off
      diredge = ls25(1) edges 1
    wp26: WorkPlane "Fascicle_1_crosssection_6_Elec1" | quickplane = yz; quickx = 9550; unite = on
      e160: Ellipse "WpEllipse_Fascicle_1_crosssection_6_Elec1" | semiaxes = {319, 380}; pos = {246, 9}
      pol160: Polygon "WpPolygon_Fascicle_1_crosssection_6_Elec1"
        source = table
        table = {{246, 9.1}, {246.1, 9.1}, {246.1, 9}, {246, 9}}
      uni160: Union "WpUnion_Fascicle_1_crosssection_6_Elec1" | input = e160, pol160; intbnd = off; edge = all
    ls26: LineSegment "Line_Fascicle_1_crosssection_6_Elec1"
      specify1 = coord
      coord1 = {9550, 246, 9}
      specify2 = coord
      coord2 = {9600, 246, 9}
    swe26: Sweep "Sweep_Fascicle_1_crosssection_6_Elec1"
      enttosweep = wp26.uni160 boundaries 1
      edge = ls26(1) edges 1
      manualdir = off
      keep = off
      includefinal = off
      diredge = ls26(1) edges 1
    wp27: WorkPlane "Fascicle_1_crosssection_7_Elec1" | quickplane = yz; quickx = 9600; unite = on
      e170: Ellipse "WpEllipse_Fascicle_1_crosssection_7_Elec1" | semiaxes = {319, 380}; pos = {246, 9}
      pol170: Polygon "WpPolygon_Fascicle_1_crosssection_7_Elec1"
        source = table
        table = {{246, 9.1}, {246.1, 9.1}, {246.1, 9}, {246, 9}}
      uni170: Union "WpUnion_Fascicle_1_crosssection_7_Elec1" | input = e170, pol170; intbnd = off; edge = all
    ls27: LineSegment "Line_Fascicle_1_crosssection_7_Elec1"
      specify1 = coord
      coord1 = {9600, 246, 9}
      specify2 = coord
      coord2 = {9650, 246, 9}
    swe27: Sweep "Sweep_Fascicle_1_crosssection_7_Elec1"
      enttosweep = wp27.uni170 boundaries 1
      edge = ls27(1) edges 1
      manualdir = off
      keep = off
      includefinal = off
      diredge = ls27(1) edges 1
    wp28: WorkPlane "Fascicle_1_crosssection_8_Elec1" | quickplane = yz; quickx = 9650; unite = on
      e180: Ellipse "WpEllipse_Fascicle_1_crosssection_8_Elec1" | semiaxes = {319, 380}; pos = {246, 9}
      pol180: Polygon "WpPolygon_Fascicle_1_crosssection_8_Elec1"
        source = table
        table = {{246, 9.1}, {246.1, 9.1}, {246.1, 9}, {246, 9}}
      uni180: Union "WpUnion_Fascicle_1_crosssection_8_Elec1" | input = e180, pol180; intbnd = off; edge = all
    ls28: LineSegment "Line_Fascicle_1_crosssection_8_Elec1"
      specify1 = coord
      coord1 = {9650, 246, 9}
      specify2 = coord
      coord2 = {9700, 246, 9}
    swe28: Sweep "Sweep_Fascicle_1_crosssection_8_Elec1"
      enttosweep = wp28.uni180 boundaries 1
      edge = ls28(1) edges 1
      manualdir = off
      keep = off
      includefinal = off
      diredge = ls28(1) edges 1
    wp29: WorkPlane "Fascicle_1_crosssection_9_Elec1" | quickplane = yz; quickx = 9700; unite = on
      e190: Ellipse "WpEllipse_Fascicle_1_crosssection_9_Elec1" | semiaxes = {319, 380}; pos = {246, 9}
      pol190: Polygon "WpPolygon_Fascicle_1_crosssection_9_Elec1"
        source = table
        table = {{246, 9.1}, {246.1, 9.1}, {246.1, 9}, {246, 9}}
      uni190: Union "WpUnion_Fascicle_1_crosssection_9_Elec1" | input = e190, pol190; intbnd = off; edge = all
    ls29: LineSegment "Line_Fascicle_1_crosssection_9_Elec1"
      specify1 = coord
      coord1 = {9700, 246, 9}
      specify2 = coord
      coord2 = {9750, 246, 9}
    swe29: Sweep "Sweep_Fascicle_1_crosssection_9_Elec1"
      enttosweep = wp29.uni190 boundaries 1
      edge = ls29(1) edges 1
      manualdir = off
      keep = off
      includefinal = off
      diredge = ls29(1) edges 1
    wp30: WorkPlane "Fascicle_1_crosssection_10_Elec1" | quickplane = yz; quickx = 9750; unite = on
      e1100: Ellipse "WpEllipse_Fascicle_1_crosssection_10_Elec1" | semiaxes = {319, 380}; pos = {246, 9}
      pol1100: Polygon "WpPolygon_Fascicle_1_crosssection_10_Elec1"
        source = table
        table = {{246, 9.1}, {246.1, 9.1}, {246.1, 9}, {246, 9}}
      uni1100: Union "WpUnion_Fascicle_1_crosssection_10_Elec1" | input = e1100, pol1100; intbnd = off; edge = all
    ls30: LineSegment "Line_Fascicle_1_crosssection_10_Elec1"
      specify1 = coord
      coord1 = {9750, 246, 9}
      specify2 = coord
      coord2 = {9800, 246, 9}
    swe30: Sweep "Sweep_Fascicle_1_crosssection_10_Elec1"
      enttosweep = wp30.uni1100 boundaries 1
      edge = ls30(1) edges 1
      manualdir = off
      keep = off
      includefinal = off
      diredge = ls30(1) edges 1
    wp31: WorkPlane "Fascicle_1_crosssection_11_Elec1" | quickplane = yz; quickx = 9800; unite = on
      e1110: Ellipse "WpEllipse_Fascicle_1_crosssection_11_Elec1" | semiaxes = {319, 380}; pos = {246, 9}
      pol1110: Polygon "WpPolygon_Fascicle_1_crosssection_11_Elec1"
        source = table
        table = {{246, 9.1}, {246.1, 9.1}, {246.1, 9}, {246, 9}}
      uni1110: Union "WpUnion_Fascicle_1_crosssection_11_Elec1" | input = e1110, pol1110; intbnd = off; edge = all
    ls31: LineSegment "Line_Fascicle_1_crosssection_11_Elec1"
      specify1 = coord
      coord1 = {9800, 246, 9}
      specify2 = coord
      coord2 = {9850, 246, 9}
    swe31: Sweep "Sweep_Fascicle_1_crosssection_11_Elec1"
      enttosweep = wp31.uni1110 boundaries 1
      edge = ls31(1) edges 1
      manualdir = off
      keep = off
      includefinal = off
      diredge = ls31(1) edges 1
    wp32: WorkPlane "Fascicle_1_crosssection_12_Elec1" | quickplane = yz; quickx = 9850; unite = on
      e1120: Ellipse "WpEllipse_Fascicle_1_crosssection_12_Elec1" | semiaxes = {319, 380}; pos = {246, 9}
      pol1120: Polygon "WpPolygon_Fascicle_1_crosssection_12_Elec1"
        source = table
        table = {{246, 9.1}, {246.1, 9.1}, {246.1, 9}, {246, 9}}
      uni1120: Union "WpUnion_Fascicle_1_crosssection_12_Elec1" | input = e1120, pol1120; intbnd = off; edge = all
    ls32: LineSegment "Line_Fascicle_1_crosssection_12_Elec1"
      specify1 = coord
      coord1 = {9850, 246, 9}
      specify2 = coord
      coord2 = {9900, 246, 9}
    swe32: Sweep "Sweep_Fascicle_1_crosssection_12_Elec1"
      enttosweep = wp32.uni1120 boundaries 1
      edge = ls32(1) edges 1
      manualdir = off
      keep = off
      includefinal = off
      diredge = ls32(1) edges 1
    wp33: WorkPlane "Fascicle_1_crosssection_13_Elec1" | quickplane = yz; quickx = 9900; unite = on
      e1130: Ellipse "WpEllipse_Fascicle_1_crosssection_13_Elec1" | semiaxes = {319, 380}; pos = {246, 9}
      pol1130: Polygon "WpPolygon_Fascicle_1_crosssection_13_Elec1"
        source = table
        table = {{246, 9.1}, {246.1, 9.1}, {246.1, 9}, {246, 9}}
      uni1130: Union "WpUnion_Fascicle_1_crosssection_13_Elec1" | input = e1130, pol1130; intbnd = off; edge = all
    ls33: LineSegment "Line_Fascicle_1_crosssection_13_Elec1"
      specify1 = coord
      coord1 = {9900, 246, 9}
      specify2 = coord
      coord2 = {9950, 246, 9}
    swe33: Sweep "Sweep_Fascicle_1_crosssection_13_Elec1"
      enttosweep = wp33.uni1130 boundaries 1
      edge = ls33(1) edges 1
      manualdir = off
      keep = off
      includefinal = off
      diredge = ls33(1) edges 1
    wp34: WorkPlane "Fascicle_1_crosssection_14_Elec1" | quickplane = yz; quickx = 9950; unite = on
      e1140: Ellipse "WpEllipse_Fascicle_1_crosssection_14_Elec1" | semiaxes = {319, 380}; pos = {246, 9}
      pol1140: Polygon "WpPolygon_Fascicle_1_crosssection_14_Elec1"
        source = table
        table = {{246, 9.1}, {246.1, 9.1}, {246.1, 9}, {246, 9}}
      uni1140: Union "WpUnion_Fascicle_1_crosssection_14_Elec1" | input = e1140, pol1140; intbnd = off; edge = all
    ls34: LineSegment "Line_Fascicle_1_crosssection_14_Elec1"
      specify1 = coord
      coord1 = {9950, 246, 9}
      specify2 = coord
      coord2 = {10000, 246, 9}
    swe34: Sweep "Sweep_Fascicle_1_crosssection_14_Elec1"
      enttosweep = wp34.uni1140 boundaries 1
      edge = ls34(1) edges 1
      manualdir = off
      keep = off
      includefinal = off
      diredge = ls34(1) edges 1
    wp35: WorkPlane "Fascicle_1_crosssection_15_Elec1" | quickplane = yz; quickx = 10000; unite = on
      e1150: Ellipse "WpEllipse_Fascicle_1_crosssection_15_Elec1" | semiaxes = {319, 380}; pos = {246, 9}
      pol1150: Polygon "WpPolygon_Fascicle_1_crosssection_15_Elec1"
        source = table
        table = {{246, 9.1}, {246.1, 9.1}, {246.1, 9}, {246, 9}}
      uni1150: Union "WpUnion_Fascicle_1_crosssection_15_Elec1" | input = e1150, pol1150; intbnd = off; edge = all
    ls35: LineSegment "Line_Fascicle_1_crosssection_15_Elec1"
      specify1 = coord
      coord1 = {10000, 246, 9}
      specify2 = coord
      coord2 = {10050, 246, 9}
    swe35: Sweep "Sweep_Fascicle_1_crosssection_15_Elec1"
      enttosweep = wp35.uni1150 boundaries 1
      edge = ls35(1) edges 1
      manualdir = off
      keep = off
      includefinal = off
      diredge = ls35(1) edges 1
    wp36: WorkPlane "Fascicle_1_crosssection_16_Elec1" | quickplane = yz; quickx = 10050; unite = on
      e1160: Ellipse "WpEllipse_Fascicle_1_crosssection_16_Elec1" | semiaxes = {319, 380}; pos = {246, 9}
      pol1160: Polygon "WpPolygon_Fascicle_1_crosssection_16_Elec1"
        source = table
        table = {{246, 9.1}, {246.1, 9.1}, {246.1, 9}, {246, 9}}
      uni1160: Union "WpUnion_Fascicle_1_crosssection_16_Elec1" | input = e1160, pol1160; intbnd = off; edge = all
    ls36: LineSegment "Line_Fascicle_1_crosssection_16_Elec1"
      specify1 = coord
      coord1 = {10050, 246, 9}
      specify2 = coord
      coord2 = {10100, 246, 9}
    swe36: Sweep "Sweep_Fascicle_1_crosssection_16_Elec1"
      enttosweep = wp36.uni1160 boundaries 1
      edge = ls36(1) edges 1
      manualdir = off
      keep = off
      includefinal = off
      diredge = ls36(1) edges 1
    wp37: WorkPlane "Fascicle_1_crosssection_17_Elec1" | quickplane = yz; quickx = 10100; unite = on
      e1170: Ellipse "WpEllipse_Fascicle_1_crosssection_17_Elec1" | semiaxes = {319, 380}; pos = {246, 9}
      pol1170: Polygon "WpPolygon_Fascicle_1_crosssection_17_Elec1"
        source = table
        table = {{246, 9.1}, {246.1, 9.1}, {246.1, 9}, {246, 9}}
      uni1170: Union "WpUnion_Fascicle_1_crosssection_17_Elec1" | input = e1170, pol1170; intbnd = off; edge = all
    ls37: LineSegment "Line_Fascicle_1_crosssection_17_Elec1"
      specify1 = coord
      coord1 = {10100, 246, 9}
      specify2 = coord
      coord2 = {10150, 246, 9}
    swe37: Sweep "Sweep_Fascicle_1_crosssection_17_Elec1"
      enttosweep = wp37.uni1170 boundaries 1
      edge = ls37(1) edges 1
      manualdir = off
      keep = off
      includefinal = off
      diredge = ls37(1) edges 1
    wp38: WorkPlane "Fascicle_1_crosssection_18_Elec1" | quickplane = yz; quickx = 10150; unite = on
      e1180: Ellipse "WpEllipse_Fascicle_1_crosssection_18_Elec1" | semiaxes = {319, 380}; pos = {246, 9}
      pol1180: Polygon "WpPolygon_Fascicle_1_crosssection_18_Elec1"
        source = table
        table = {{246, 9.1}, {246.1, 9.1}, {246.1, 9}, {246, 9}}
      uni1180: Union "WpUnion_Fascicle_1_crosssection_18_Elec1" | input = e1180, pol1180; intbnd = off; edge = all
    ls38: LineSegment "Line_Fascicle_1_crosssection_18_Elec1"
      specify1 = coord
      coord1 = {10150, 246, 9}
      specify2 = coord
      coord2 = {10200, 246, 9}
    swe38: Sweep "Sweep_Fascicle_1_crosssection_18_Elec1"
      enttosweep = wp38.uni1180 boundaries 1
      edge = ls38(1) edges 1
      manualdir = off
      keep = off
      includefinal = off
      diredge = ls38(1) edges 1
    wp39: WorkPlane "Fascicle_1_crosssection_19_Elec1" | quickplane = yz; quickx = 10200; unite = on
      e1190: Ellipse "WpEllipse_Fascicle_1_crosssection_19_Elec1" | semiaxes = {319, 380}; pos = {246, 9}
      pol1190: Polygon "WpPolygon_Fascicle_1_crosssection_19_Elec1"
        source = table
        table = {{246, 9.1}, {246.1, 9.1}, {246.1, 9}, {246, 9}}
      uni1190: Union "WpUnion_Fascicle_1_crosssection_19_Elec1" | input = e1190, pol1190; intbnd = off; edge = all
    ls39: LineSegment "Line_Fascicle_1_crosssection_19_Elec1"
      specify1 = coord
      coord1 = {10200, 246, 9}
      specify2 = coord
      coord2 = {10250, 246, 9}
    swe39: Sweep "Sweep_Fascicle_1_crosssection_19_Elec1"
      enttosweep = wp39.uni1190 boundaries 1
      edge = ls39(1) edges 1
      manualdir = off
      keep = off
      includefinal = off
      diredge = ls39(1) edges 1
    wp40: WorkPlane "Fascicle_1_crosssection_20_Elec1" | quickplane = yz; quickx = 10250; unite = on
      e1200: Ellipse "WpEllipse_Fascicle_1_crosssection_20_Elec1" | semiaxes = {319, 380}; pos = {246, 9}
      pol1200: Polygon "WpPolygon_Fascicle_1_crosssection_20_Elec1"
        source = table
        table = {{246, 9.1}, {246.1, 9.1}, {246.1, 9}, {246, 9}}
      uni1200: Union "WpUnion_Fascicle_1_crosssection_20_Elec1" | input = e1200, pol1200; intbnd = off; edge = all
    ls40: LineSegment "Line_Fascicle_1_crosssection_20_Elec1"
      specify1 = coord
      coord1 = {10250, 246, 9}
      specify2 = coord
      coord2 = {20020, 246, 9}
    swe40: Sweep "Sweep_Fascicle_1_crosssection_20_Elec1"
      enttosweep = wp40.uni1200 boundaries 1
      edge = ls40(1) edges 1
      manualdir = off
      keep = off
      includefinal = off
      diredge = ls40(1) edges 1
    uni10: Union "Union_Fascicle_1_Elec1"
      input = swe21, swe22, swe23, swe24, swe25, swe26, swe27, swe28, swe29, swe30, swe31, swe32, swe33, swe34, swe35, swe36, swe37, swe38, swe39, swe40
      intbnd = off
      face = all
    cylsel20: CylinderSelection "Selec_boundary_Fascicle_1_Elec1"
      entitydim = 2
      r = 10000
      top = 20019
      bottom = 1
      pos = {0, 246, 9}
      axistype = x
    cylsel21: CylinderSelection "Selec_domain_Fascicle_1_Elec1"
      entitydim = 3
      r = 10000
      top = 20019
      bottom = 1
      pos = {0, 246, 9}
      axistype = x
    cylsel22: CylinderSelection "Selec_boundary_Fascicle_1insulation1_Elec1"
      entitydim = 2
      r = 1
      top = 1
      bottom = -1
      pos = {0, 246, 9}
      axistype = x
    cylsel23: CylinderSelection "Selec_boundary_Fascicle_1insulation2_Elec1"
      entitydim = 2
      r = 1
      top = 20021
      bottom = 20019
      pos = {0, 246, 9}
      axistype = x
    mov41: Move | input = copy1; displx = 0; disply = 0; displz = -20000; indexattrtag = mov41.index
    dif3: Difference | input = uni10; input2 = mov41
    mov2001: Move "Move_Fascicle_1_y_20000_Elec1"
      input = dif3
      displx = 0
      disply = 20000
      displz = 0
      indexattrtag = mov2001.index
    wp41: WorkPlane "Fascicle_2_crosssection_1_Elec1" | quickplane = yz; unite = on
      e210: Ellipse "WpEllipse_Fascicle_2_crosssection_1_Elec1" | semiaxes = {180, 180}; pos = {-296, -212}
      pol210: Polygon "WpPolygon_Fascicle_2_crosssection_1_Elec1"
        source = table
        table = {{-296, -211.9}, {-295.9, -211.9}, {-295.9, -212}, {-296, -212}}
      uni210: Union "WpUnion_Fascicle_2_crosssection_1_Elec1" | input = e210, pol210; intbnd = off; edge = all
    ls41: LineSegment "Line_Fascicle_2_crosssection_1_Elec1"
      specify1 = coord
      coord1 = {0, -296, -212}
      specify2 = coord
      coord2 = {9350, -296, -212}
    swe41: Sweep "Sweep_Fascicle_2_crosssection_1_Elec1"
      enttosweep = wp41.uni210 boundaries 1
      edge = ls41(1) edges 1
      manualdir = off
      keep = off
      includefinal = off
      diredge = ls41(1) edges 1
    wp42: WorkPlane "Fascicle_2_crosssection_2_Elec1" | quickplane = yz; quickx = 9350; unite = on
      e220: Ellipse "WpEllipse_Fascicle_2_crosssection_2_Elec1" | semiaxes = {180, 180}; pos = {-296, -212}
      pol220: Polygon "WpPolygon_Fascicle_2_crosssection_2_Elec1"
        source = table
        table = {{-296, -211.9}, {-295.9, -211.9}, {-295.9, -212}, {-296, -212}}
      uni220: Union "WpUnion_Fascicle_2_crosssection_2_Elec1" | input = e220, pol220; intbnd = off; edge = all
    ls42: LineSegment "Line_Fascicle_2_crosssection_2_Elec1"
      specify1 = coord
      coord1 = {9350, -296, -212}
      specify2 = coord
      coord2 = {9400, -296, -212}
    swe42: Sweep "Sweep_Fascicle_2_crosssection_2_Elec1"
      enttosweep = wp42.uni220 boundaries 1
      edge = ls42(1) edges 1
      manualdir = off
      keep = off
      includefinal = off
      diredge = ls42(1) edges 1
    wp43: WorkPlane "Fascicle_2_crosssection_3_Elec1" | quickplane = yz; quickx = 9400; unite = on
      e230: Ellipse "WpEllipse_Fascicle_2_crosssection_3_Elec1" | semiaxes = {180, 180}; pos = {-296, -212}
      pol230: Polygon "WpPolygon_Fascicle_2_crosssection_3_Elec1"
        source = table
        table = {{-296, -211.9}, {-295.9, -211.9}, {-295.9, -212}, {-296, -212}}
      uni230: Union "WpUnion_Fascicle_2_crosssection_3_Elec1" | input = e230, pol230; intbnd = off; edge = all
    ls43: LineSegment "Line_Fascicle_2_crosssection_3_Elec1"
      specify1 = coord
      coord1 = {9400, -296, -212}
      specify2 = coord
      coord2 = {9450, -296, -212}
    swe43: Sweep "Sweep_Fascicle_2_crosssection_3_Elec1"
      enttosweep = wp43.uni230 boundaries 1
      edge = ls43(1) edges 1
      manualdir = off
      keep = off
      includefinal = off
      diredge = ls43(1) edges 1
    wp44: WorkPlane "Fascicle_2_crosssection_4_Elec1" | quickplane = yz; quickx = 9450; unite = on
      e240: Ellipse "WpEllipse_Fascicle_2_crosssection_4_Elec1" | semiaxes = {180, 180}; pos = {-296, -212}
      pol240: Polygon "WpPolygon_Fascicle_2_crosssection_4_Elec1"
        source = table
        table = {{-296, -211.9}, {-295.9, -211.9}, {-295.9, -212}, {-296, -212}}
      uni240: Union "WpUnion_Fascicle_2_crosssection_4_Elec1" | input = e240, pol240; intbnd = off; edge = all
    ls44: LineSegment "Line_Fascicle_2_crosssection_4_Elec1"
      specify1 = coord
      coord1 = {9450, -296, -212}
      specify2 = coord
      coord2 = {9500, -296, -212}
    swe44: Sweep "Sweep_Fascicle_2_crosssection_4_Elec1"
      enttosweep = wp44.uni240 boundaries 1
      edge = ls44(1) edges 1
      manualdir = off
      keep = off
      includefinal = off
      diredge = ls44(1) edges 1
    wp45: WorkPlane "Fascicle_2_crosssection_5_Elec1" | quickplane = yz; quickx = 9500; unite = on
      e250: Ellipse "WpEllipse_Fascicle_2_crosssection_5_Elec1" | semiaxes = {180, 180}; pos = {-296, -212}
      pol250: Polygon "WpPolygon_Fascicle_2_crosssection_5_Elec1"
        source = table
        table = {{-296, -211.9}, {-295.9, -211.9}, {-295.9, -212}, {-296, -212}}
      uni250: Union "WpUnion_Fascicle_2_crosssection_5_Elec1" | input = e250, pol250; intbnd = off; edge = all
    ls45: LineSegment "Line_Fascicle_2_crosssection_5_Elec1"
      specify1 = coord
      coord1 = {9500, -296, -212}
      specify2 = coord
      coord2 = {9550, -296, -212}
    swe45: Sweep "Sweep_Fascicle_2_crosssection_5_Elec1"
      enttosweep = wp45.uni250 boundaries 1
      edge = ls45(1) edges 1
      manualdir = off
      keep = off
      includefinal = off
      diredge = ls45(1) edges 1
    wp46: WorkPlane "Fascicle_2_crosssection_6_Elec1" | quickplane = yz; quickx = 9550; unite = on
      e260: Ellipse "WpEllipse_Fascicle_2_crosssection_6_Elec1" | semiaxes = {180, 180}; pos = {-296, -212}
      pol260: Polygon "WpPolygon_Fascicle_2_crosssection_6_Elec1"
        source = table
        table = {{-296, -211.9}, {-295.9, -211.9}, {-295.9, -212}, {-296, -212}}
      uni260: Union "WpUnion_Fascicle_2_crosssection_6_Elec1" | input = e260, pol260; intbnd = off; edge = all
    ls46: LineSegment "Line_Fascicle_2_crosssection_6_Elec1"
      specify1 = coord
      coord1 = {9550, -296, -212}
      specify2 = coord
      coord2 = {9600, -296, -212}
    swe46: Sweep "Sweep_Fascicle_2_crosssection_6_Elec1"
      enttosweep = wp46.uni260 boundaries 1
      edge = ls46(1) edges 1
      manualdir = off
      keep = off
      includefinal = off
      diredge = ls46(1) edges 1
    wp47: WorkPlane "Fascicle_2_crosssection_7_Elec1" | quickplane = yz; quickx = 9600; unite = on
      e270: Ellipse "WpEllipse_Fascicle_2_crosssection_7_Elec1" | semiaxes = {180, 180}; pos = {-296, -212}
      pol270: Polygon "WpPolygon_Fascicle_2_crosssection_7_Elec1"
        source = table
        table = {{-296, -211.9}, {-295.9, -211.9}, {-295.9, -212}, {-296, -212}}
      uni270: Union "WpUnion_Fascicle_2_crosssection_7_Elec1" | input = e270, pol270; intbnd = off; edge = all
    ls47: LineSegment "Line_Fascicle_2_crosssection_7_Elec1"
      specify1 = coord
      coord1 = {9600, -296, -212}
      specify2 = coord
      coord2 = {9650, -296, -212}
    swe47: Sweep "Sweep_Fascicle_2_crosssection_7_Elec1"
      enttosweep = wp47.uni270 boundaries 1
      edge = ls47(1) edges 1
      manualdir = off
      keep = off
      includefinal = off
      diredge = ls47(1) edges 1
    wp48: WorkPlane "Fascicle_2_crosssection_8_Elec1" | quickplane = yz; quickx = 9650; unite = on
      e280: Ellipse "WpEllipse_Fascicle_2_crosssection_8_Elec1" | semiaxes = {180, 180}; pos = {-296, -212}
      pol280: Polygon "WpPolygon_Fascicle_2_crosssection_8_Elec1"
        source = table
        table = {{-296, -211.9}, {-295.9, -211.9}, {-295.9, -212}, {-296, -212}}
      uni280: Union "WpUnion_Fascicle_2_crosssection_8_Elec1" | input = e280, pol280; intbnd = off; edge = all
    ls48: LineSegment "Line_Fascicle_2_crosssection_8_Elec1"
      specify1 = coord
      coord1 = {9650, -296, -212}
      specify2 = coord
      coord2 = {9700, -296, -212}
    swe48: Sweep "Sweep_Fascicle_2_crosssection_8_Elec1"
      enttosweep = wp48.uni280 boundaries 1
      edge = ls48(1) edges 1
      manualdir = off
      keep = off
      includefinal = off
      diredge = ls48(1) edges 1
    wp49: WorkPlane "Fascicle_2_crosssection_9_Elec1" | quickplane = yz; quickx = 9700; unite = on
      e290: Ellipse "WpEllipse_Fascicle_2_crosssection_9_Elec1" | semiaxes = {180, 180}; pos = {-296, -212}
      pol290: Polygon "WpPolygon_Fascicle_2_crosssection_9_Elec1"
        source = table
        table = {{-296, -211.9}, {-295.9, -211.9}, {-295.9, -212}, {-296, -212}}
      uni290: Union "WpUnion_Fascicle_2_crosssection_9_Elec1" | input = e290, pol290; intbnd = off; edge = all
    ls49: LineSegment "Line_Fascicle_2_crosssection_9_Elec1"
      specify1 = coord
      coord1 = {9700, -296, -212}
      specify2 = coord
      coord2 = {9750, -296, -212}
    swe49: Sweep "Sweep_Fascicle_2_crosssection_9_Elec1"
      enttosweep = wp49.uni290 boundaries 1
      edge = ls49(1) edges 1
      manualdir = off
      keep = off
      includefinal = off
      diredge = ls49(1) edges 1
    wp50: WorkPlane "Fascicle_2_crosssection_10_Elec1" | quickplane = yz; quickx = 9750; unite = on
      e2100: Ellipse "WpEllipse_Fascicle_2_crosssection_10_Elec1" | semiaxes = {180, 180}; pos = {-296, -212}
      pol2100: Polygon "WpPolygon_Fascicle_2_crosssection_10_Elec1"
        source = table
        table = {{-296, -211.9}, {-295.9, -211.9}, {-295.9, -212}, {-296, -212}}
      uni2100: Union "WpUnion_Fascicle_2_crosssection_10_Elec1" | input = e2100, pol2100; intbnd = off; edge = all
    ls50: LineSegment "Line_Fascicle_2_crosssection_10_Elec1"
      specify1 = coord
      coord1 = {9750, -296, -212}
      specify2 = coord
      coord2 = {9800, -296, -212}
    swe50: Sweep "Sweep_Fascicle_2_crosssection_10_Elec1"
      enttosweep = wp50.uni2100 boundaries 1
      edge = ls50(1) edges 1
      manualdir = off
      keep = off
      includefinal = off
      diredge = ls50(1) edges 1
    wp51: WorkPlane "Fascicle_2_crosssection_11_Elec1" | quickplane = yz; quickx = 9800; unite = on
      e2110: Ellipse "WpEllipse_Fascicle_2_crosssection_11_Elec1" | semiaxes = {180, 180}; pos = {-296, -212}
      pol2110: Polygon "WpPolygon_Fascicle_2_crosssection_11_Elec1"
        source = table
        table = {{-296, -211.9}, {-295.9, -211.9}, {-295.9, -212}, {-296, -212}}
      uni2110: Union "WpUnion_Fascicle_2_crosssection_11_Elec1" | input = e2110, pol2110; intbnd = off; edge = all
    ls51: LineSegment "Line_Fascicle_2_crosssection_11_Elec1"
      specify1 = coord
      coord1 = {9800, -296, -212}
      specify2 = coord
      coord2 = {9850, -296, -212}
    swe51: Sweep "Sweep_Fascicle_2_crosssection_11_Elec1"
      enttosweep = wp51.uni2110 boundaries 1
      edge = ls51(1) edges 1
      manualdir = off
      keep = off
      includefinal = off
      diredge = ls51(1) edges 1
    wp52: WorkPlane "Fascicle_2_crosssection_12_Elec1" | quickplane = yz; quickx = 9850; unite = on
      e2120: Ellipse "WpEllipse_Fascicle_2_crosssection_12_Elec1" | semiaxes = {180, 180}; pos = {-296, -212}
      pol2120: Polygon "WpPolygon_Fascicle_2_crosssection_12_Elec1"
        source = table
        table = {{-296, -211.9}, {-295.9, -211.9}, {-295.9, -212}, {-296, -212}}
      uni2120: Union "WpUnion_Fascicle_2_crosssection_12_Elec1" | input = e2120, pol2120; intbnd = off; edge = all
    ls52: LineSegment "Line_Fascicle_2_crosssection_12_Elec1"
      specify1 = coord
      coord1 = {9850, -296, -212}
      specify2 = coord
      coord2 = {9900, -296, -212}
    swe52: Sweep "Sweep_Fascicle_2_crosssection_12_Elec1"
      enttosweep = wp52.uni2120 boundaries 1
      edge = ls52(1) edges 1
      manualdir = off
      keep = off
      includefinal = off
      diredge = ls52(1) edges 1
    wp53: WorkPlane "Fascicle_2_crosssection_13_Elec1" | quickplane = yz; quickx = 9900; unite = on
      e2130: Ellipse "WpEllipse_Fascicle_2_crosssection_13_Elec1" | semiaxes = {180, 180}; pos = {-296, -212}
      pol2130: Polygon "WpPolygon_Fascicle_2_crosssection_13_Elec1"
        source = table
        table = {{-296, -211.9}, {-295.9, -211.9}, {-295.9, -212}, {-296, -212}}
      uni2130: Union "WpUnion_Fascicle_2_crosssection_13_Elec1" | input = e2130, pol2130; intbnd = off; edge = all
    ls53: LineSegment "Line_Fascicle_2_crosssection_13_Elec1"
      specify1 = coord
      coord1 = {9900, -296, -212}
      specify2 = coord
      coord2 = {9950, -296, -212}
    swe53: Sweep "Sweep_Fascicle_2_crosssection_13_Elec1"
      enttosweep = wp53.uni2130 boundaries 1
      edge = ls53(1) edges 1
      manualdir = off
      keep = off
      includefinal = off
      diredge = ls53(1) edges 1
    wp54: WorkPlane "Fascicle_2_crosssection_14_Elec1" | quickplane = yz; quickx = 9950; unite = on
      e2140: Ellipse "WpEllipse_Fascicle_2_crosssection_14_Elec1" | semiaxes = {180, 180}; pos = {-296, -212}
      pol2140: Polygon "WpPolygon_Fascicle_2_crosssection_14_Elec1"
        source = table
        table = {{-296, -211.9}, {-295.9, -211.9}, {-295.9, -212}, {-296, -212}}
      uni2140: Union "WpUnion_Fascicle_2_crosssection_14_Elec1" | input = e2140, pol2140; intbnd = off; edge = all
    ls54: LineSegment "Line_Fascicle_2_crosssection_14_Elec1"
      specify1 = coord
      coord1 = {9950, -296, -212}
      specify2 = coord
      coord2 = {10000, -296, -212}
    swe54: Sweep "Sweep_Fascicle_2_crosssection_14_Elec1"
      enttosweep = wp54.uni2140 boundaries 1
      edge = ls54(1) edges 1
      manualdir = off
      keep = off
      includefinal = off
      diredge = ls54(1) edges 1
    wp55: WorkPlane "Fascicle_2_crosssection_15_Elec1" | quickplane = yz; quickx = 10000; unite = on
      e2150: Ellipse "WpEllipse_Fascicle_2_crosssection_15_Elec1" | semiaxes = {180, 180}; pos = {-296, -212}
      pol2150: Polygon "WpPolygon_Fascicle_2_crosssection_15_Elec1"
        source = table
        table = {{-296, -211.9}, {-295.9, -211.9}, {-295.9, -212}, {-296, -212}}
      uni2150: Union "WpUnion_Fascicle_2_crosssection_15_Elec1" | input = e2150, pol2150; intbnd = off; edge = all
    ls55: LineSegment "Line_Fascicle_2_crosssection_15_Elec1"
      specify1 = coord
      coord1 = {10000, -296, -212}
      specify2 = coord
      coord2 = {10050, -296, -212}
    swe55: Sweep "Sweep_Fascicle_2_crosssection_15_Elec1"
      enttosweep = wp55.uni2150 boundaries 1
      edge = ls55(1) edges 1
      manualdir = off
      keep = off
      includefinal = off
      diredge = ls55(1) edges 1
    wp56: WorkPlane "Fascicle_2_crosssection_16_Elec1" | quickplane = yz; quickx = 10050; unite = on
      e2160: Ellipse "WpEllipse_Fascicle_2_crosssection_16_Elec1" | semiaxes = {180, 180}; pos = {-296, -212}
      pol2160: Polygon "WpPolygon_Fascicle_2_crosssection_16_Elec1"
        source = table
        table = {{-296, -211.9}, {-295.9, -211.9}, {-295.9, -212}, {-296, -212}}
      uni2160: Union "WpUnion_Fascicle_2_crosssection_16_Elec1" | input = e2160, pol2160; intbnd = off; edge = all
    ls56: LineSegment "Line_Fascicle_2_crosssection_16_Elec1"
      specify1 = coord
      coord1 = {10050, -296, -212}
      specify2 = coord
      coord2 = {10100, -296, -212}
    swe56: Sweep "Sweep_Fascicle_2_crosssection_16_Elec1"
      enttosweep = wp56.uni2160 boundaries 1
      edge = ls56(1) edges 1
      manualdir = off
      keep = off
      includefinal = off
      diredge = ls56(1) edges 1
    wp57: WorkPlane "Fascicle_2_crosssection_17_Elec1" | quickplane = yz; quickx = 10100; unite = on
      e2170: Ellipse "WpEllipse_Fascicle_2_crosssection_17_Elec1" | semiaxes = {180, 180}; pos = {-296, -212}
      pol2170: Polygon "WpPolygon_Fascicle_2_crosssection_17_Elec1"
        source = table
        table = {{-296, -211.9}, {-295.9, -211.9}, {-295.9, -212}, {-296, -212}}
      uni2170: Union "WpUnion_Fascicle_2_crosssection_17_Elec1" | input = e2170, pol2170; intbnd = off; edge = all
    ls57: LineSegment "Line_Fascicle_2_crosssection_17_Elec1"
      specify1 = coord
      coord1 = {10100, -296, -212}
      specify2 = coord
      coord2 = {10150, -296, -212}
    swe57: Sweep "Sweep_Fascicle_2_crosssection_17_Elec1"
      enttosweep = wp57.uni2170 boundaries 1
      edge = ls57(1) edges 1
      manualdir = off
      keep = off
      includefinal = off
      diredge = ls57(1) edges 1
    wp58: WorkPlane "Fascicle_2_crosssection_18_Elec1" | quickplane = yz; quickx = 10150; unite = on
      e2180: Ellipse "WpEllipse_Fascicle_2_crosssection_18_Elec1" | semiaxes = {180, 180}; pos = {-296, -212}
      pol2180: Polygon "WpPolygon_Fascicle_2_crosssection_18_Elec1"
        source = table
        table = {{-296, -211.9}, {-295.9, -211.9}, {-295.9, -212}, {-296, -212}}
      uni2180: Union "WpUnion_Fascicle_2_crosssection_18_Elec1" | input = e2180, pol2180; intbnd = off; edge = all
    ls58: LineSegment "Line_Fascicle_2_crosssection_18_Elec1"
      specify1 = coord
      coord1 = {10150, -296, -212}
      specify2 = coord
      coord2 = {10200, -296, -212}
    swe58: Sweep "Sweep_Fascicle_2_crosssection_18_Elec1"
      enttosweep = wp58.uni2180 boundaries 1
      edge = ls58(1) edges 1
      manualdir = off
      keep = off
      includefinal = off
      diredge = ls58(1) edges 1
    wp59: WorkPlane "Fascicle_2_crosssection_19_Elec1" | quickplane = yz; quickx = 10200; unite = on
      e2190: Ellipse "WpEllipse_Fascicle_2_crosssection_19_Elec1" | semiaxes = {180, 180}; pos = {-296, -212}
      pol2190: Polygon "WpPolygon_Fascicle_2_crosssection_19_Elec1"
        source = table
        table = {{-296, -211.9}, {-295.9, -211.9}, {-295.9, -212}, {-296, -212}}
      uni2190: Union "WpUnion_Fascicle_2_crosssection_19_Elec1" | input = e2190, pol2190; intbnd = off; edge = all
    ls59: LineSegment "Line_Fascicle_2_crosssection_19_Elec1"
      specify1 = coord
      coord1 = {10200, -296, -212}
      specify2 = coord
      coord2 = {10250, -296, -212}
    swe59: Sweep "Sweep_Fascicle_2_crosssection_19_Elec1"
      enttosweep = wp59.uni2190 boundaries 1
      edge = ls59(1) edges 1
      manualdir = off
      keep = off
      includefinal = off
      diredge = ls59(1) edges 1
    wp60: WorkPlane "Fascicle_2_crosssection_20_Elec1" | quickplane = yz; quickx = 10250; unite = on
      e2200: Ellipse "WpEllipse_Fascicle_2_crosssection_20_Elec1" | semiaxes = {180, 180}; pos = {-296, -212}
      pol2200: Polygon "WpPolygon_Fascicle_2_crosssection_20_Elec1"
        source = table
        table = {{-296, -211.9}, {-295.9, -211.9}, {-295.9, -212}, {-296, -212}}
      uni2200: Union "WpUnion_Fascicle_2_crosssection_20_Elec1" | input = e2200, pol2200; intbnd = off; edge = all
    ls60: LineSegment "Line_Fascicle_2_crosssection_20_Elec1"
      specify1 = coord
      coord1 = {10250, -296, -212}
      specify2 = coord
      coord2 = {20020, -296, -212}
    swe60: Sweep "Sweep_Fascicle_2_crosssection_20_Elec1"
      enttosweep = wp60.uni2200 boundaries 1
      edge = ls60(1) edges 1
      manualdir = off
      keep = off
      includefinal = off
      diredge = ls60(1) edges 1
    uni20: Union "Union_Fascicle_2_Elec1"
      input = swe41, swe42, swe43, swe44, swe45, swe46, swe47, swe48, swe49, swe50, swe51, swe52, swe53, swe54, swe55, swe56, swe57, swe58, swe59, swe60
      intbnd = off
      face = all
    cylsel40: CylinderSelection "Selec_boundary_Fascicle_2_Elec1"
      entitydim = 2
      r = 10000
      top = 20019
      bottom = 1
      pos = {0, -296, -212}
      axistype = x
    cylsel41: CylinderSelection "Selec_domain_Fascicle_2_Elec1"
      entitydim = 3
      r = 10000
      top = 20019
      bottom = 1
      pos = {0, -296, -212}
      axistype = x
    cylsel42: CylinderSelection "Selec_boundary_Fascicle_2insulation1_Elec1"
      entitydim = 2
      r = 1
      top = 1
      bottom = -1
      pos = {0, -296, -212}
      axistype = x
    cylsel43: CylinderSelection "Selec_boundary_Fascicle_2insulation2_Elec1"
      entitydim = 2
      r = 1
      top = 20021
      bottom = 20019
      pos = {0, -296, -212}
      axistype = x
    mov42: Move | input = copy2; displx = 0; disply = 0; displz = -20000; indexattrtag = mov42.index
    dif4: Difference | input = uni20; input2 = mov42
    mov2002: Move "Move_Fascicle_2_y_40000_Elec1"
      input = dif4
      displx = 0
      disply = 40000
      displz = 0
      indexattrtag = mov2002.index
    wp61: WorkPlane "Fascicle_3_crosssection_1_Elec1" | quickplane = yz; unite = on
      e310: Ellipse "WpEllipse_Fascicle_3_crosssection_1_Elec1" | semiaxes = {110, 142.5}; pos = {-227, 177}; rot = -15
      pol310: Polygon "WpPolygon_Fascicle_3_crosssection_1_Elec1"
        source = table
        table = {{-227, 177.1}, {-226.9, 177.1}, {-226.9, 177}, {-227, 177}}
      uni310: Union "WpUnion_Fascicle_3_crosssection_1_Elec1" | input = e310, pol310; intbnd = off; edge = all
    ls61: LineSegment "Line_Fascicle_3_crosssection_1_Elec1"
      specify1 = coord
      coord1 = {0, -227, 177}
      specify2 = coord
      coord2 = {9350, -227, 177}
    swe61: Sweep "Sweep_Fascicle_3_crosssection_1_Elec1"
      enttosweep = wp61.uni310 boundaries 1
      edge = ls61(1) edges 1
      manualdir = off
      keep = off
      includefinal = off
      diredge = ls61(1) edges 1
    wp62: WorkPlane "Fascicle_3_crosssection_2_Elec1" | quickplane = yz; quickx = 9350; unite = on
      e320: Ellipse "WpEllipse_Fascicle_3_crosssection_2_Elec1" | semiaxes = {110, 142.5}; pos = {-227, 177}; rot = -15
      pol320: Polygon "WpPolygon_Fascicle_3_crosssection_2_Elec1"
        source = table
        table = {{-227, 177.1}, {-226.9, 177.1}, {-226.9, 177}, {-227, 177}}
      uni320: Union "WpUnion_Fascicle_3_crosssection_2_Elec1" | input = e320, pol320; intbnd = off; edge = all
    ls62: LineSegment "Line_Fascicle_3_crosssection_2_Elec1"
      specify1 = coord
      coord1 = {9350, -227, 177}
      specify2 = coord
      coord2 = {9400, -227, 177}
    swe62: Sweep "Sweep_Fascicle_3_crosssection_2_Elec1"
      enttosweep = wp62.uni320 boundaries 1
      edge = ls62(1) edges 1
      manualdir = off
      keep = off
      includefinal = off
      diredge = ls62(1) edges 1
    wp63: WorkPlane "Fascicle_3_crosssection_3_Elec1" | quickplane = yz; quickx = 9400; unite = on
      e330: Ellipse "WpEllipse_Fascicle_3_crosssection_3_Elec1" | semiaxes = {110, 142.5}; pos = {-227, 177}; rot = -15
      pol330: Polygon "WpPolygon_Fascicle_3_crosssection_3_Elec1"
        source = table
        table = {{-227, 177.1}, {-226.9, 177.1}, {-226.9, 177}, {-227, 177}}
      uni330: Union "WpUnion_Fascicle_3_crosssection_3_Elec1" | input = e330, pol330; intbnd = off; edge = all
    ls63: LineSegment "Line_Fascicle_3_crosssection_3_Elec1"
      specify1 = coord
      coord1 = {9400, -227, 177}
      specify2 = coord
      coord2 = {9450, -227, 177}
    swe63: Sweep "Sweep_Fascicle_3_crosssection_3_Elec1"
      enttosweep = wp63.uni330 boundaries 1
      edge = ls63(1) edges 1
      manualdir = off
      keep = off
      includefinal = off
      diredge = ls63(1) edges 1
    wp64: WorkPlane "Fascicle_3_crosssection_4_Elec1" | quickplane = yz; quickx = 9450; unite = on
      e340: Ellipse "WpEllipse_Fascicle_3_crosssection_4_Elec1" | semiaxes = {110, 142.5}; pos = {-227, 177}; rot = -15
      pol340: Polygon "WpPolygon_Fascicle_3_crosssection_4_Elec1"
        source = table
        table = {{-227, 177.1}, {-226.9, 177.1}, {-226.9, 177}, {-227, 177}}
      uni340: Union "WpUnion_Fascicle_3_crosssection_4_Elec1" | input = e340, pol340; intbnd = off; edge = all
    ls64: LineSegment "Line_Fascicle_3_crosssection_4_Elec1"
      specify1 = coord
      coord1 = {9450, -227, 177}
      specify2 = coord
      coord2 = {9500, -227, 177}
    swe64: Sweep "Sweep_Fascicle_3_crosssection_4_Elec1"
      enttosweep = wp64.uni340 boundaries 1
      edge = ls64(1) edges 1
      manualdir = off
      keep = off
      includefinal = off
      diredge = ls64(1) edges 1
    wp65: WorkPlane "Fascicle_3_crosssection_5_Elec1" | quickplane = yz; quickx = 9500; unite = on
      e350: Ellipse "WpEllipse_Fascicle_3_crosssection_5_Elec1" | semiaxes = {110, 142.5}; pos = {-227, 177}; rot = -15
      pol350: Polygon "WpPolygon_Fascicle_3_crosssection_5_Elec1"
        source = table
        table = {{-227, 177.1}, {-226.9, 177.1}, {-226.9, 177}, {-227, 177}}
      uni350: Union "WpUnion_Fascicle_3_crosssection_5_Elec1" | input = e350, pol350; intbnd = off; edge = all
    ls65: LineSegment "Line_Fascicle_3_crosssection_5_Elec1"
      specify1 = coord
      coord1 = {9500, -227, 177}
      specify2 = coord
      coord2 = {9550, -227, 177}
    swe65: Sweep "Sweep_Fascicle_3_crosssection_5_Elec1"
      enttosweep = wp65.uni350 boundaries 1
      edge = ls65(1) edges 1
      manualdir = off
      keep = off
      includefinal = off
      diredge = ls65(1) edges 1
    wp66: WorkPlane "Fascicle_3_crosssection_6_Elec1" | quickplane = yz; quickx = 9550; unite = on
      e360: Ellipse "WpEllipse_Fascicle_3_crosssection_6_Elec1" | semiaxes = {110, 142.5}; pos = {-227, 177}; rot = -15
      pol360: Polygon "WpPolygon_Fascicle_3_crosssection_6_Elec1"
        source = table
        table = {{-227, 177.1}, {-226.9, 177.1}, {-226.9, 177}, {-227, 177}}
      uni360: Union "WpUnion_Fascicle_3_crosssection_6_Elec1" | input = e360, pol360; intbnd = off; edge = all
    ls66: LineSegment "Line_Fascicle_3_crosssection_6_Elec1"
      specify1 = coord
      coord1 = {9550, -227, 177}
      specify2 = coord
      coord2 = {9600, -227, 177}
    swe66: Sweep "Sweep_Fascicle_3_crosssection_6_Elec1"
      enttosweep = wp66.uni360 boundaries 1
      edge = ls66(1) edges 1
      manualdir = off
      keep = off
      includefinal = off
      diredge = ls66(1) edges 1
    wp67: WorkPlane "Fascicle_3_crosssection_7_Elec1" | quickplane = yz; quickx = 9600; unite = on
      e370: Ellipse "WpEllipse_Fascicle_3_crosssection_7_Elec1" | semiaxes = {110, 142.5}; pos = {-227, 177}; rot = -15
      pol370: Polygon "WpPolygon_Fascicle_3_crosssection_7_Elec1"
        source = table
        table = {{-227, 177.1}, {-226.9, 177.1}, {-226.9, 177}, {-227, 177}}
      uni370: Union "WpUnion_Fascicle_3_crosssection_7_Elec1" | input = e370, pol370; intbnd = off; edge = all
    ls67: LineSegment "Line_Fascicle_3_crosssection_7_Elec1"
      specify1 = coord
      coord1 = {9600, -227, 177}
      specify2 = coord
      coord2 = {9650, -227, 177}
    swe67: Sweep "Sweep_Fascicle_3_crosssection_7_Elec1"
      enttosweep = wp67.uni370 boundaries 1
      edge = ls67(1) edges 1
      manualdir = off
      keep = off
      includefinal = off
      diredge = ls67(1) edges 1
    wp68: WorkPlane "Fascicle_3_crosssection_8_Elec1" | quickplane = yz; quickx = 9650; unite = on
      e380: Ellipse "WpEllipse_Fascicle_3_crosssection_8_Elec1" | semiaxes = {110, 142.5}; pos = {-227, 177}; rot = -15
      pol380: Polygon "WpPolygon_Fascicle_3_crosssection_8_Elec1"
        source = table
        table = {{-227, 177.1}, {-226.9, 177.1}, {-226.9, 177}, {-227, 177}}
      uni380: Union "WpUnion_Fascicle_3_crosssection_8_Elec1" | input = e380, pol380; intbnd = off; edge = all
    ls68: LineSegment "Line_Fascicle_3_crosssection_8_Elec1"
      specify1 = coord
      coord1 = {9650, -227, 177}
      specify2 = coord
      coord2 = {9700, -227, 177}
    swe68: Sweep "Sweep_Fascicle_3_crosssection_8_Elec1"
      enttosweep = wp68.uni380 boundaries 1
      edge = ls68(1) edges 1
      manualdir = off
      keep = off
      includefinal = off
      diredge = ls68(1) edges 1
    wp69: WorkPlane "Fascicle_3_crosssection_9_Elec1" | quickplane = yz; quickx = 9700; unite = on
      e390: Ellipse "WpEllipse_Fascicle_3_crosssection_9_Elec1" | semiaxes = {110, 142.5}; pos = {-227, 177}; rot = -15
      pol390: Polygon "WpPolygon_Fascicle_3_crosssection_9_Elec1"
        source = table
        table = {{-227, 177.1}, {-226.9, 177.1}, {-226.9, 177}, {-227, 177}}
      uni390: Union "WpUnion_Fascicle_3_crosssection_9_Elec1" | input = e390, pol390; intbnd = off; edge = all
    ls69: LineSegment "Line_Fascicle_3_crosssection_9_Elec1"
      specify1 = coord
      coord1 = {9700, -227, 177}
      specify2 = coord
      coord2 = {9750, -227, 177}
    swe69: Sweep "Sweep_Fascicle_3_crosssection_9_Elec1"
      enttosweep = wp69.uni390 boundaries 1
      edge = ls69(1) edges 1
      manualdir = off
      keep = off
      includefinal = off
      diredge = ls69(1) edges 1
    wp70: WorkPlane "Fascicle_3_crosssection_10_Elec1" | quickplane = yz; quickx = 9750; unite = on
      e3100: Ellipse "WpEllipse_Fascicle_3_crosssection_10_Elec1" | semiaxes = {110, 142.5}; pos = {-227, 177}; rot = -15
      pol3100: Polygon "WpPolygon_Fascicle_3_crosssection_10_Elec1"
        source = table
        table = {{-227, 177.1}, {-226.9, 177.1}, {-226.9, 177}, {-227, 177}}
      uni3100: Union "WpUnion_Fascicle_3_crosssection_10_Elec1" | input = e3100, pol3100; intbnd = off; edge = all
    ls70: LineSegment "Line_Fascicle_3_crosssection_10_Elec1"
      specify1 = coord
      coord1 = {9750, -227, 177}
      specify2 = coord
      coord2 = {9800, -227, 177}
    swe70: Sweep "Sweep_Fascicle_3_crosssection_10_Elec1"
      enttosweep = wp70.uni3100 boundaries 1
      edge = ls70(1) edges 1
      manualdir = off
      keep = off
      includefinal = off
      diredge = ls70(1) edges 1
    wp71: WorkPlane "Fascicle_3_crosssection_11_Elec1" | quickplane = yz; quickx = 9800; unite = on
      e3110: Ellipse "WpEllipse_Fascicle_3_crosssection_11_Elec1" | semiaxes = {110, 142.5}; pos = {-227, 177}; rot = -15
      pol3110: Polygon "WpPolygon_Fascicle_3_crosssection_11_Elec1"
        source = table
        table = {{-227, 177.1}, {-226.9, 177.1}, {-226.9, 177}, {-227, 177}}
      uni3110: Union "WpUnion_Fascicle_3_crosssection_11_Elec1" | input = e3110, pol3110; intbnd = off; edge = all
    ls71: LineSegment "Line_Fascicle_3_crosssection_11_Elec1"
      specify1 = coord
      coord1 = {9800, -227, 177}
      specify2 = coord
      coord2 = {9850, -227, 177}
    swe71: Sweep "Sweep_Fascicle_3_crosssection_11_Elec1"
      enttosweep = wp71.uni3110 boundaries 1
      edge = ls71(1) edges 1
      manualdir = off
      keep = off
      includefinal = off
      diredge = ls71(1) edges 1
    wp72: WorkPlane "Fascicle_3_crosssection_12_Elec1" | quickplane = yz; quickx = 9850; unite = on
      e3120: Ellipse "WpEllipse_Fascicle_3_crosssection_12_Elec1" | semiaxes = {110, 142.5}; pos = {-227, 177}; rot = -15
      pol3120: Polygon "WpPolygon_Fascicle_3_crosssection_12_Elec1"
        source = table
        table = {{-227, 177.1}, {-226.9, 177.1}, {-226.9, 177}, {-227, 177}}
      uni3120: Union "WpUnion_Fascicle_3_crosssection_12_Elec1" | input = e3120, pol3120; intbnd = off; edge = all
    ls72: LineSegment "Line_Fascicle_3_crosssection_12_Elec1"
      specify1 = coord
      coord1 = {9850, -227, 177}
      specify2 = coord
      coord2 = {9900, -227, 177}
    swe72: Sweep "Sweep_Fascicle_3_crosssection_12_Elec1"
      enttosweep = wp72.uni3120 boundaries 1
      edge = ls72(1) edges 1
      manualdir = off
      keep = off
      includefinal = off
      diredge = ls72(1) edges 1
    wp73: WorkPlane "Fascicle_3_crosssection_13_Elec1" | quickplane = yz; quickx = 9900; unite = on
      e3130: Ellipse "WpEllipse_Fascicle_3_crosssection_13_Elec1" | semiaxes = {110, 142.5}; pos = {-227, 177}; rot = -15
      pol3130: Polygon "WpPolygon_Fascicle_3_crosssection_13_Elec1"
        source = table
        table = {{-227, 177.1}, {-226.9, 177.1}, {-226.9, 177}, {-227, 177}}
      uni3130: Union "WpUnion_Fascicle_3_crosssection_13_Elec1" | input = e3130, pol3130; intbnd = off; edge = all
    ls73: LineSegment "Line_Fascicle_3_crosssection_13_Elec1"
      specify1 = coord
      coord1 = {9900, -227, 177}
      specify2 = coord
      coord2 = {9950, -227, 177}
    swe73: Sweep "Sweep_Fascicle_3_crosssection_13_Elec1"
      enttosweep = wp73.uni3130 boundaries 1
      edge = ls73(1) edges 1
      manualdir = off
      keep = off
      includefinal = off
      diredge = ls73(1) edges 1
    wp74: WorkPlane "Fascicle_3_crosssection_14_Elec1" | quickplane = yz; quickx = 9950; unite = on
      e3140: Ellipse "WpEllipse_Fascicle_3_crosssection_14_Elec1" | semiaxes = {110, 142.5}; pos = {-227, 177}; rot = -15
      pol3140: Polygon "WpPolygon_Fascicle_3_crosssection_14_Elec1"
        source = table
        table = {{-227, 177.1}, {-226.9, 177.1}, {-226.9, 177}, {-227, 177}}
      uni3140: Union "WpUnion_Fascicle_3_crosssection_14_Elec1" | input = e3140, pol3140; intbnd = off; edge = all
    ls74: LineSegment "Line_Fascicle_3_crosssection_14_Elec1"
      specify1 = coord
      coord1 = {9950, -227, 177}
      specify2 = coord
      coord2 = {10000, -227, 177}
    swe74: Sweep "Sweep_Fascicle_3_crosssection_14_Elec1"
      enttosweep = wp74.uni3140 boundaries 1
      edge = ls74(1) edges 1
      manualdir = off
      keep = off
      includefinal = off
      diredge = ls74(1) edges 1
    wp75: WorkPlane "Fascicle_3_crosssection_15_Elec1" | quickplane = yz; quickx = 10000; unite = on
      e3150: Ellipse "WpEllipse_Fascicle_3_crosssection_15_Elec1" | semiaxes = {110, 142.5}; pos = {-227, 177}; rot = -15
      pol3150: Polygon "WpPolygon_Fascicle_3_crosssection_15_Elec1"
        source = table
        table = {{-227, 177.1}, {-226.9, 177.1}, {-226.9, 177}, {-227, 177}}
      uni3150: Union "WpUnion_Fascicle_3_crosssection_15_Elec1" | input = e3150, pol3150; intbnd = off; edge = all
    ls75: LineSegment "Line_Fascicle_3_crosssection_15_Elec1"
      specify1 = coord
      coord1 = {10000, -227, 177}
      specify2 = coord
      coord2 = {10050, -227, 177}
    swe75: Sweep "Sweep_Fascicle_3_crosssection_15_Elec1"
      enttosweep = wp75.uni3150 boundaries 1
      edge = ls75(1) edges 1
      manualdir = off
      keep = off
      includefinal = off
      diredge = ls75(1) edges 1
    wp76: WorkPlane "Fascicle_3_crosssection_16_Elec1" | quickplane = yz; quickx = 10050; unite = on
      e3160: Ellipse "WpEllipse_Fascicle_3_crosssection_16_Elec1" | semiaxes = {110, 142.5}; pos = {-227, 177}; rot = -15
      pol3160: Polygon "WpPolygon_Fascicle_3_crosssection_16_Elec1"
        source = table
        table = {{-227, 177.1}, {-226.9, 177.1}, {-226.9, 177}, {-227, 177}}
      uni3160: Union "WpUnion_Fascicle_3_crosssection_16_Elec1" | input = e3160, pol3160; intbnd = off; edge = all
    ls76: LineSegment "Line_Fascicle_3_crosssection_16_Elec1"
      specify1 = coord
      coord1 = {10050, -227, 177}
      specify2 = coord
      coord2 = {10100, -227, 177}
    swe76: Sweep "Sweep_Fascicle_3_crosssection_16_Elec1"
      enttosweep = wp76.uni3160 boundaries 1
      edge = ls76(1) edges 1
      manualdir = off
      keep = off
      includefinal = off
      diredge = ls76(1) edges 1
    wp77: WorkPlane "Fascicle_3_crosssection_17_Elec1" | quickplane = yz; quickx = 10100; unite = on
      e3170: Ellipse "WpEllipse_Fascicle_3_crosssection_17_Elec1" | semiaxes = {110, 142.5}; pos = {-227, 177}; rot = -15
      pol3170: Polygon "WpPolygon_Fascicle_3_crosssection_17_Elec1"
        source = table
        table = {{-227, 177.1}, {-226.9, 177.1}, {-226.9, 177}, {-227, 177}}
      uni3170: Union "WpUnion_Fascicle_3_crosssection_17_Elec1" | input = e3170, pol3170; intbnd = off; edge = all
    ls77: LineSegment "Line_Fascicle_3_crosssection_17_Elec1"
      specify1 = coord
      coord1 = {10100, -227, 177}
      specify2 = coord
      coord2 = {10150, -227, 177}
    swe77: Sweep "Sweep_Fascicle_3_crosssection_17_Elec1"
      enttosweep = wp77.uni3170 boundaries 1
      edge = ls77(1) edges 1
      manualdir = off
      keep = off
      includefinal = off
      diredge = ls77(1) edges 1
    wp78: WorkPlane "Fascicle_3_crosssection_18_Elec1" | quickplane = yz; quickx = 10150; unite = on
      e3180: Ellipse "WpEllipse_Fascicle_3_crosssection_18_Elec1" | semiaxes = {110, 142.5}; pos = {-227, 177}; rot = -15
      pol3180: Polygon "WpPolygon_Fascicle_3_crosssection_18_Elec1"
        source = table
        table = {{-227, 177.1}, {-226.9, 177.1}, {-226.9, 177}, {-227, 177}}
      uni3180: Union "WpUnion_Fascicle_3_crosssection_18_Elec1" | input = e3180, pol3180; intbnd = off; edge = all
    ls78: LineSegment "Line_Fascicle_3_crosssection_18_Elec1"
      specify1 = coord
      coord1 = {10150, -227, 177}
      specify2 = coord
      coord2 = {10200, -227, 177}
    swe78: Sweep "Sweep_Fascicle_3_crosssection_18_Elec1"
      enttosweep = wp78.uni3180 boundaries 1
      edge = ls78(1) edges 1
      manualdir = off
      keep = off
      includefinal = off
      diredge = ls78(1) edges 1
    wp79: WorkPlane "Fascicle_3_crosssection_19_Elec1" | quickplane = yz; quickx = 10200; unite = on
      e3190: Ellipse "WpEllipse_Fascicle_3_crosssection_19_Elec1" | semiaxes = {110, 142.5}; pos = {-227, 177}; rot = -15
      pol3190: Polygon "WpPolygon_Fascicle_3_crosssection_19_Elec1"
        source = table
        table = {{-227, 177.1}, {-226.9, 177.1}, {-226.9, 177}, {-227, 177}}
      uni3190: Union "WpUnion_Fascicle_3_crosssection_19_Elec1" | input = e3190, pol3190; intbnd = off; edge = all
    ls79: LineSegment "Line_Fascicle_3_crosssection_19_Elec1"
      specify1 = coord
      coord1 = {10200, -227, 177}
      specify2 = coord
      coord2 = {10250, -227, 177}
    swe79: Sweep "Sweep_Fascicle_3_crosssection_19_Elec1"
      enttosweep = wp79.uni3190 boundaries 1
      edge = ls79(1) edges 1
      manualdir = off
      keep = off
      includefinal = off
      diredge = ls79(1) edges 1
    wp80: WorkPlane "Fascicle_3_crosssection_20_Elec1" | quickplane = yz; quickx = 10250; unite = on
      e3200: Ellipse "WpEllipse_Fascicle_3_crosssection_20_Elec1" | semiaxes = {110, 142.5}; pos = {-227, 177}; rot = -15
      pol3200: Polygon "WpPolygon_Fascicle_3_crosssection_20_Elec1"
        source = table
        table = {{-227, 177.1}, {-226.9, 177.1}, {-226.9, 177}, {-227, 177}}
      uni3200: Union "WpUnion_Fascicle_3_crosssection_20_Elec1" | input = e3200, pol3200; intbnd = off; edge = all
    ls80: LineSegment "Line_Fascicle_3_crosssection_20_Elec1"
      specify1 = coord
      coord1 = {10250, -227, 177}
      specify2 = coord
      coord2 = {20020, -227, 177}
    swe80: Sweep "Sweep_Fascicle_3_crosssection_20_Elec1"
      enttosweep = wp80.uni3200 boundaries 1
      edge = ls80(1) edges 1
      manualdir = off
      keep = off
      includefinal = off
      diredge = ls80(1) edges 1
    uni30: Union "Union_Fascicle_3_Elec1"
      input = swe61, swe62, swe63, swe64, swe65, swe66, swe67, swe68, swe69, swe70, swe71, swe72, swe73, swe74, swe75, swe76, swe77, swe78, swe79, swe80
      intbnd = off
      face = all
    cylsel60: CylinderSelection "Selec_boundary_Fascicle_3_Elec1"
      entitydim = 2
      r = 10000
      top = 20019
      bottom = 1
      pos = {0, -227, 177}
      axistype = x
    cylsel61: CylinderSelection "Selec_domain_Fascicle_3_Elec1"
      entitydim = 3
      r = 10000
      top = 20019
      bottom = 1
      pos = {0, -227, 177}
      axistype = x
    cylsel62: CylinderSelection "Selec_boundary_Fascicle_3insulation1_Elec1"
      entitydim = 2
      r = 1
      top = 1
      bottom = -1
      pos = {0, -227, 177}
      axistype = x
    cylsel63: CylinderSelection "Selec_boundary_Fascicle_3insulation2_Elec1"
      entitydim = 2
      r = 1
      top = 20021
      bottom = 20019
      pos = {0, -227, 177}
      axistype = x
    mov43: Move | input = copy3; displx = 0; disply = 0; displz = -20000; indexattrtag = mov43.index
    dif5: Difference | input = uni30; input2 = mov43
    mov2003: Move "Move_Fascicle_3_y_60000_Elec1"
      input = dif5
      displx = 0
      disply = 60000
      displz = 0
      indexattrtag = mov2003.index
    wp81: WorkPlane "Fascicle_4_crosssection_1_Elec1" | quickplane = yz; unite = on
      e410: Ellipse "WpEllipse_Fascicle_4_crosssection_1_Elec1" | semiaxes = {70, 70}; pos = {-523, 14}
      pol410: Polygon "WpPolygon_Fascicle_4_crosssection_1_Elec1"
        source = table
        table = {{-523, 14.1}, {-522.9, 14.1}, {-522.9, 14}, {-523, 14}}
      uni410: Union "WpUnion_Fascicle_4_crosssection_1_Elec1" | input = e410, pol410; intbnd = off; edge = all
    ls81: LineSegment "Line_Fascicle_4_crosssection_1_Elec1"
      specify1 = coord
      coord1 = {0, -523, 14}
      specify2 = coord
      coord2 = {9350, -523, 14}
    swe81: Sweep "Sweep_Fascicle_4_crosssection_1_Elec1"
      enttosweep = wp81.uni410 boundaries 1
      edge = ls81(1) edges 1
      manualdir = off
      keep = off
      includefinal = off
      diredge = ls81(1) edges 1
    wp82: WorkPlane "Fascicle_4_crosssection_2_Elec1" | quickplane = yz; quickx = 9350; unite = on
      e420: Ellipse "WpEllipse_Fascicle_4_crosssection_2_Elec1" | semiaxes = {70, 70}; pos = {-523, 14}
      pol420: Polygon "WpPolygon_Fascicle_4_crosssection_2_Elec1"
        source = table
        table = {{-523, 14.1}, {-522.9, 14.1}, {-522.9, 14}, {-523, 14}}
      uni420: Union "WpUnion_Fascicle_4_crosssection_2_Elec1" | input = e420, pol420; intbnd = off; edge = all
    ls82: LineSegment "Line_Fascicle_4_crosssection_2_Elec1"
      specify1 = coord
      coord1 = {9350, -523, 14}
      specify2 = coord
      coord2 = {9400, -523, 14}
    swe82: Sweep "Sweep_Fascicle_4_crosssection_2_Elec1"
      enttosweep = wp82.uni420 boundaries 1
      edge = ls82(1) edges 1
      manualdir = off
      keep = off
      includefinal = off
      diredge = ls82(1) edges 1
    wp83: WorkPlane "Fascicle_4_crosssection_3_Elec1" | quickplane = yz; quickx = 9400; unite = on
      e430: Ellipse "WpEllipse_Fascicle_4_crosssection_3_Elec1" | semiaxes = {70, 70}; pos = {-523, 14}
      pol430: Polygon "WpPolygon_Fascicle_4_crosssection_3_Elec1"
        source = table
        table = {{-523, 14.1}, {-522.9, 14.1}, {-522.9, 14}, {-523, 14}}
      uni430: Union "WpUnion_Fascicle_4_crosssection_3_Elec1" | input = e430, pol430; intbnd = off; edge = all
    ls83: LineSegment "Line_Fascicle_4_crosssection_3_Elec1"
      specify1 = coord
      coord1 = {9400, -523, 14}
      specify2 = coord
      coord2 = {9450, -523, 14}
    swe83: Sweep "Sweep_Fascicle_4_crosssection_3_Elec1"
      enttosweep = wp83.uni430 boundaries 1
      edge = ls83(1) edges 1
      manualdir = off
      keep = off
      includefinal = off
      diredge = ls83(1) edges 1
    wp84: WorkPlane "Fascicle_4_crosssection_4_Elec1" | quickplane = yz; quickx = 9450; unite = on
      e440: Ellipse "WpEllipse_Fascicle_4_crosssection_4_Elec1" | semiaxes = {70, 70}; pos = {-523, 14}
      pol440: Polygon "WpPolygon_Fascicle_4_crosssection_4_Elec1"
        source = table
        table = {{-523, 14.1}, {-522.9, 14.1}, {-522.9, 14}, {-523, 14}}
      uni440: Union "WpUnion_Fascicle_4_crosssection_4_Elec1" | input = e440, pol440; intbnd = off; edge = all
    ls84: LineSegment "Line_Fascicle_4_crosssection_4_Elec1"
      specify1 = coord
      coord1 = {9450, -523, 14}
      specify2 = coord
      coord2 = {9500, -523, 14}
    swe84: Sweep "Sweep_Fascicle_4_crosssection_4_Elec1"
      enttosweep = wp84.uni440 boundaries 1
      edge = ls84(1) edges 1
      manualdir = off
      keep = off
      includefinal = off
      diredge = ls84(1) edges 1
    wp85: WorkPlane "Fascicle_4_crosssection_5_Elec1" | quickplane = yz; quickx = 9500; unite = on
      e450: Ellipse "WpEllipse_Fascicle_4_crosssection_5_Elec1" | semiaxes = {70, 70}; pos = {-523, 14}
      pol450: Polygon "WpPolygon_Fascicle_4_crosssection_5_Elec1"
        source = table
        table = {{-523, 14.1}, {-522.9, 14.1}, {-522.9, 14}, {-523, 14}}
      uni450: Union "WpUnion_Fascicle_4_crosssection_5_Elec1" | input = e450, pol450; intbnd = off; edge = all
    ls85: LineSegment "Line_Fascicle_4_crosssection_5_Elec1"
      specify1 = coord
      coord1 = {9500, -523, 14}
      specify2 = coord
      coord2 = {9550, -523, 14}
    swe85: Sweep "Sweep_Fascicle_4_crosssection_5_Elec1"
      enttosweep = wp85.uni450 boundaries 1
      edge = ls85(1) edges 1
      manualdir = off
      keep = off
      includefinal = off
      diredge = ls85(1) edges 1
    wp86: WorkPlane "Fascicle_4_crosssection_6_Elec1" | quickplane = yz; quickx = 9550; unite = on
      e460: Ellipse "WpEllipse_Fascicle_4_crosssection_6_Elec1" | semiaxes = {70, 70}; pos = {-523, 14}
      pol460: Polygon "WpPolygon_Fascicle_4_crosssection_6_Elec1"
        source = table
        table = {{-523, 14.1}, {-522.9, 14.1}, {-522.9, 14}, {-523, 14}}
      uni460: Union "WpUnion_Fascicle_4_crosssection_6_Elec1" | input = e460, pol460; intbnd = off; edge = all
    ls86: LineSegment "Line_Fascicle_4_crosssection_6_Elec1"
      specify1 = coord
      coord1 = {9550, -523, 14}
      specify2 = coord
      coord2 = {9600, -523, 14}
    swe86: Sweep "Sweep_Fascicle_4_crosssection_6_Elec1"
      enttosweep = wp86.uni460 boundaries 1
      edge = ls86(1) edges 1
      manualdir = off
      keep = off
      includefinal = off
      diredge = ls86(1) edges 1
    wp87: WorkPlane "Fascicle_4_crosssection_7_Elec1" | quickplane = yz; quickx = 9600; unite = on
      e470: Ellipse "WpEllipse_Fascicle_4_crosssection_7_Elec1" | semiaxes = {70, 70}; pos = {-523, 14}
      pol470: Polygon "WpPolygon_Fascicle_4_crosssection_7_Elec1"
        source = table
        table = {{-523, 14.1}, {-522.9, 14.1}, {-522.9, 14}, {-523, 14}}
      uni470: Union "WpUnion_Fascicle_4_crosssection_7_Elec1" | input = e470, pol470; intbnd = off; edge = all
    ls87: LineSegment "Line_Fascicle_4_crosssection_7_Elec1"
      specify1 = coord
      coord1 = {9600, -523, 14}
      specify2 = coord
      coord2 = {9650, -523, 14}
    swe87: Sweep "Sweep_Fascicle_4_crosssection_7_Elec1"
      enttosweep = wp87.uni470 boundaries 1
      edge = ls87(1) edges 1
      manualdir = off
      keep = off
      includefinal = off
      diredge = ls87(1) edges 1
    wp88: WorkPlane "Fascicle_4_crosssection_8_Elec1" | quickplane = yz; quickx = 9650; unite = on
      e480: Ellipse "WpEllipse_Fascicle_4_crosssection_8_Elec1" | semiaxes = {70, 70}; pos = {-523, 14}
      pol480: Polygon "WpPolygon_Fascicle_4_crosssection_8_Elec1"
        source = table
        table = {{-523, 14.1}, {-522.9, 14.1}, {-522.9, 14}, {-523, 14}}
      uni480: Union "WpUnion_Fascicle_4_crosssection_8_Elec1" | input = e480, pol480; intbnd = off; edge = all
    ls88: LineSegment "Line_Fascicle_4_crosssection_8_Elec1"
      specify1 = coord
      coord1 = {9650, -523, 14}
      specify2 = coord
      coord2 = {9700, -523, 14}
    swe88: Sweep "Sweep_Fascicle_4_crosssection_8_Elec1"
      enttosweep = wp88.uni480 boundaries 1
      edge = ls88(1) edges 1
      manualdir = off
      keep = off
      includefinal = off
      diredge = ls88(1) edges 1
    wp89: WorkPlane "Fascicle_4_crosssection_9_Elec1" | quickplane = yz; quickx = 9700; unite = on
      e490: Ellipse "WpEllipse_Fascicle_4_crosssection_9_Elec1" | semiaxes = {70, 70}; pos = {-523, 14}
      pol490: Polygon "WpPolygon_Fascicle_4_crosssection_9_Elec1"
        source = table
        table = {{-523, 14.1}, {-522.9, 14.1}, {-522.9, 14}, {-523, 14}}
      uni490: Union "WpUnion_Fascicle_4_crosssection_9_Elec1" | input = e490, pol490; intbnd = off; edge = all
    ls89: LineSegment "Line_Fascicle_4_crosssection_9_Elec1"
      specify1 = coord
      coord1 = {9700, -523, 14}
      specify2 = coord
      coord2 = {9750, -523, 14}
    swe89: Sweep "Sweep_Fascicle_4_crosssection_9_Elec1"
      enttosweep = wp89.uni490 boundaries 1
      edge = ls89(1) edges 1
      manualdir = off
      keep = off
      includefinal = off
      diredge = ls89(1) edges 1
    wp90: WorkPlane "Fascicle_4_crosssection_10_Elec1" | quickplane = yz; quickx = 9750; unite = on
      e4100: Ellipse "WpEllipse_Fascicle_4_crosssection_10_Elec1" | semiaxes = {70, 70}; pos = {-523, 14}
      pol4100: Polygon "WpPolygon_Fascicle_4_crosssection_10_Elec1"
        source = table
        table = {{-523, 14.1}, {-522.9, 14.1}, {-522.9, 14}, {-523, 14}}
      uni4100: Union "WpUnion_Fascicle_4_crosssection_10_Elec1" | input = e4100, pol4100; intbnd = off; edge = all
    ls90: LineSegment "Line_Fascicle_4_crosssection_10_Elec1"
      specify1 = coord
      coord1 = {9750, -523, 14}
      specify2 = coord
      coord2 = {9800, -523, 14}
    swe90: Sweep "Sweep_Fascicle_4_crosssection_10_Elec1"
      enttosweep = wp90.uni4100 boundaries 1
      edge = ls90(1) edges 1
      manualdir = off
      keep = off
      includefinal = off
      diredge = ls90(1) edges 1
    wp91: WorkPlane "Fascicle_4_crosssection_11_Elec1" | quickplane = yz; quickx = 9800; unite = on
      e4110: Ellipse "WpEllipse_Fascicle_4_crosssection_11_Elec1" | semiaxes = {70, 70}; pos = {-523, 14}
      pol4110: Polygon "WpPolygon_Fascicle_4_crosssection_11_Elec1"
        source = table
        table = {{-523, 14.1}, {-522.9, 14.1}, {-522.9, 14}, {-523, 14}}
      uni4110: Union "WpUnion_Fascicle_4_crosssection_11_Elec1" | input = e4110, pol4110; intbnd = off; edge = all
    ls91: LineSegment "Line_Fascicle_4_crosssection_11_Elec1"
      specify1 = coord
      coord1 = {9800, -523, 14}
      specify2 = coord
      coord2 = {9850, -523, 14}
    swe91: Sweep "Sweep_Fascicle_4_crosssection_11_Elec1"
      enttosweep = wp91.uni4110 boundaries 1
      edge = ls91(1) edges 1
      manualdir = off
      keep = off
      includefinal = off
      diredge = ls91(1) edges 1
    wp92: WorkPlane "Fascicle_4_crosssection_12_Elec1" | quickplane = yz; quickx = 9850; unite = on
      e4120: Ellipse "WpEllipse_Fascicle_4_crosssection_12_Elec1" | semiaxes = {70, 70}; pos = {-523, 14}
      pol4120: Polygon "WpPolygon_Fascicle_4_crosssection_12_Elec1"
        source = table
        table = {{-523, 14.1}, {-522.9, 14.1}, {-522.9, 14}, {-523, 14}}
      uni4120: Union "WpUnion_Fascicle_4_crosssection_12_Elec1" | input = e4120, pol4120; intbnd = off; edge = all
    ls92: LineSegment "Line_Fascicle_4_crosssection_12_Elec1"
      specify1 = coord
      coord1 = {9850, -523, 14}
      specify2 = coord
      coord2 = {9900, -523, 14}
    swe92: Sweep "Sweep_Fascicle_4_crosssection_12_Elec1"
      enttosweep = wp92.uni4120 boundaries 1
      edge = ls92(1) edges 1
      manualdir = off
      keep = off
      includefinal = off
      diredge = ls92(1) edges 1
    wp93: WorkPlane "Fascicle_4_crosssection_13_Elec1" | quickplane = yz; quickx = 9900; unite = on
      e4130: Ellipse "WpEllipse_Fascicle_4_crosssection_13_Elec1" | semiaxes = {70, 70}; pos = {-523, 14}
      pol4130: Polygon "WpPolygon_Fascicle_4_crosssection_13_Elec1"
        source = table
        table = {{-523, 14.1}, {-522.9, 14.1}, {-522.9, 14}, {-523, 14}}
      uni4130: Union "WpUnion_Fascicle_4_crosssection_13_Elec1" | input = e4130, pol4130; intbnd = off; edge = all
    ls93: LineSegment "Line_Fascicle_4_crosssection_13_Elec1"
      specify1 = coord
      coord1 = {9900, -523, 14}
      specify2 = coord
      coord2 = {9950, -523, 14}
    swe93: Sweep "Sweep_Fascicle_4_crosssection_13_Elec1"
      enttosweep = wp93.uni4130 boundaries 1
      edge = ls93(1) edges 1
      manualdir = off
      keep = off
      includefinal = off
      diredge = ls93(1) edges 1
    wp94: WorkPlane "Fascicle_4_crosssection_14_Elec1" | quickplane = yz; quickx = 9950; unite = on
      e4140: Ellipse "WpEllipse_Fascicle_4_crosssection_14_Elec1" | semiaxes = {70, 70}; pos = {-523, 14}
      pol4140: Polygon "WpPolygon_Fascicle_4_crosssection_14_Elec1"
        source = table
        table = {{-523, 14.1}, {-522.9, 14.1}, {-522.9, 14}, {-523, 14}}
      uni4140: Union "WpUnion_Fascicle_4_crosssection_14_Elec1" | input = e4140, pol4140; intbnd = off; edge = all
    ls94: LineSegment "Line_Fascicle_4_crosssection_14_Elec1"
      specify1 = coord
      coord1 = {9950, -523, 14}
      specify2 = coord
      coord2 = {10000, -523, 14}
    swe94: Sweep "Sweep_Fascicle_4_crosssection_14_Elec1"
      enttosweep = wp94.uni4140 boundaries 1
      edge = ls94(1) edges 1
      manualdir = off
      keep = off
      includefinal = off
      diredge = ls94(1) edges 1
    wp95: WorkPlane "Fascicle_4_crosssection_15_Elec1" | quickplane = yz; quickx = 10000; unite = on
      e4150: Ellipse "WpEllipse_Fascicle_4_crosssection_15_Elec1" | semiaxes = {70, 70}; pos = {-523, 14}
      pol4150: Polygon "WpPolygon_Fascicle_4_crosssection_15_Elec1"
        source = table
        table = {{-523, 14.1}, {-522.9, 14.1}, {-522.9, 14}, {-523, 14}}
      uni4150: Union "WpUnion_Fascicle_4_crosssection_15_Elec1" | input = e4150, pol4150; intbnd = off; edge = all
    ls95: LineSegment "Line_Fascicle_4_crosssection_15_Elec1"
      specify1 = coord
      coord1 = {10000, -523, 14}
      specify2 = coord
      coord2 = {10050, -523, 14}
    swe95: Sweep "Sweep_Fascicle_4_crosssection_15_Elec1"
      enttosweep = wp95.uni4150 boundaries 1
      edge = ls95(1) edges 1
      manualdir = off
      keep = off
      includefinal = off
      diredge = ls95(1) edges 1
    wp96: WorkPlane "Fascicle_4_crosssection_16_Elec1" | quickplane = yz; quickx = 10050; unite = on
      e4160: Ellipse "WpEllipse_Fascicle_4_crosssection_16_Elec1" | semiaxes = {70, 70}; pos = {-523, 14}
      pol4160: Polygon "WpPolygon_Fascicle_4_crosssection_16_Elec1"
        source = table
        table = {{-523, 14.1}, {-522.9, 14.1}, {-522.9, 14}, {-523, 14}}
      uni4160: Union "WpUnion_Fascicle_4_crosssection_16_Elec1" | input = e4160, pol4160; intbnd = off; edge = all
    ls96: LineSegment "Line_Fascicle_4_crosssection_16_Elec1"
      specify1 = coord
      coord1 = {10050, -523, 14}
      specify2 = coord
      coord2 = {10100, -523, 14}
    swe96: Sweep "Sweep_Fascicle_4_crosssection_16_Elec1"
      enttosweep = wp96.uni4160 boundaries 1
      edge = ls96(1) edges 1
      manualdir = off
      keep = off
      includefinal = off
      diredge = ls96(1) edges 1
    wp97: WorkPlane "Fascicle_4_crosssection_17_Elec1" | quickplane = yz; quickx = 10100; unite = on
      e4170: Ellipse "WpEllipse_Fascicle_4_crosssection_17_Elec1" | semiaxes = {70, 70}; pos = {-523, 14}
      pol4170: Polygon "WpPolygon_Fascicle_4_crosssection_17_Elec1"
        source = table
        table = {{-523, 14.1}, {-522.9, 14.1}, {-522.9, 14}, {-523, 14}}
      uni4170: Union "WpUnion_Fascicle_4_crosssection_17_Elec1" | input = e4170, pol4170; intbnd = off; edge = all
    ls97: LineSegment "Line_Fascicle_4_crosssection_17_Elec1"
      specify1 = coord
      coord1 = {10100, -523, 14}
      specify2 = coord
      coord2 = {10150, -523, 14}
    swe97: Sweep "Sweep_Fascicle_4_crosssection_17_Elec1"
      enttosweep = wp97.uni4170 boundaries 1
      edge = ls97(1) edges 1
      manualdir = off
      keep = off
      includefinal = off
      diredge = ls97(1) edges 1
    wp98: WorkPlane "Fascicle_4_crosssection_18_Elec1" | quickplane = yz; quickx = 10150; unite = on
      e4180: Ellipse "WpEllipse_Fascicle_4_crosssection_18_Elec1" | semiaxes = {70, 70}; pos = {-523, 14}
      pol4180: Polygon "WpPolygon_Fascicle_4_crosssection_18_Elec1"
        source = table
        table = {{-523, 14.1}, {-522.9, 14.1}, {-522.9, 14}, {-523, 14}}
      uni4180: Union "WpUnion_Fascicle_4_crosssection_18_Elec1" | input = e4180, pol4180; intbnd = off; edge = all
    ls98: LineSegment "Line_Fascicle_4_crosssection_18_Elec1"
      specify1 = coord
      coord1 = {10150, -523, 14}
      specify2 = coord
      coord2 = {10200, -523, 14}
    swe98: Sweep "Sweep_Fascicle_4_crosssection_18_Elec1"
      enttosweep = wp98.uni4180 boundaries 1
      edge = ls98(1) edges 1
      manualdir = off
      keep = off
      includefinal = off
      diredge = ls98(1) edges 1
    wp99: WorkPlane "Fascicle_4_crosssection_19_Elec1" | quickplane = yz; quickx = 10200; unite = on
      e4190: Ellipse "WpEllipse_Fascicle_4_crosssection_19_Elec1" | semiaxes = {70, 70}; pos = {-523, 14}
      pol4190: Polygon "WpPolygon_Fascicle_4_crosssection_19_Elec1"
        source = table
        table = {{-523, 14.1}, {-522.9, 14.1}, {-522.9, 14}, {-523, 14}}
      uni4190: Union "WpUnion_Fascicle_4_crosssection_19_Elec1" | input = e4190, pol4190; intbnd = off; edge = all
    ls99: LineSegment "Line_Fascicle_4_crosssection_19_Elec1"
      specify1 = coord
      coord1 = {10200, -523, 14}
      specify2 = coord
      coord2 = {10250, -523, 14}
    swe99: Sweep "Sweep_Fascicle_4_crosssection_19_Elec1"
      enttosweep = wp99.uni4190 boundaries 1
      edge = ls99(1) edges 1
      manualdir = off
      keep = off
      includefinal = off
      diredge = ls99(1) edges 1
    wp100: WorkPlane "Fascicle_4_crosssection_20_Elec1" | quickplane = yz; quickx = 10250; unite = on
      e4200: Ellipse "WpEllipse_Fascicle_4_crosssection_20_Elec1" | semiaxes = {70, 70}; pos = {-523, 14}
      pol4200: Polygon "WpPolygon_Fascicle_4_crosssection_20_Elec1"
        source = table
        table = {{-523, 14.1}, {-522.9, 14.1}, {-522.9, 14}, {-523, 14}}
      uni4200: Union "WpUnion_Fascicle_4_crosssection_20_Elec1" | input = e4200, pol4200; intbnd = off; edge = all
    ls100: LineSegment "Line_Fascicle_4_crosssection_20_Elec1"
      specify1 = coord
      coord1 = {10250, -523, 14}
      specify2 = coord
      coord2 = {20020, -523, 14}
    swe100: Sweep "Sweep_Fascicle_4_crosssection_20_Elec1"
      enttosweep = wp100.uni4200 boundaries 1
      edge = ls100(1) edges 1
      manualdir = off
      keep = off
      includefinal = off
      diredge = ls100(1) edges 1
    uni40: Union "Union_Fascicle_4_Elec1"
      input = swe81, swe82, swe83, swe84, swe85, swe86, swe87, swe88, swe89, swe90, swe91, swe92, swe93, swe94, swe95, swe96, swe97, swe98, swe99, swe100
      intbnd = off
      face = all
    cylsel80: CylinderSelection "Selec_boundary_Fascicle_4_Elec1"
      entitydim = 2
      r = 10000
      top = 20019
      bottom = 1
      pos = {0, -523, 14}
      axistype = x
    cylsel81: CylinderSelection "Selec_domain_Fascicle_4_Elec1"
      entitydim = 3
      r = 10000
      top = 20019
      bottom = 1
      pos = {0, -523, 14}
      axistype = x
    cylsel82: CylinderSelection "Selec_boundary_Fascicle_4insulation1_Elec1"
      entitydim = 2
      r = 1
      top = 1
      bottom = -1
      pos = {0, -523, 14}
      axistype = x
    cylsel83: CylinderSelection "Selec_boundary_Fascicle_4insulation2_Elec1"
      entitydim = 2
      r = 1
      top = 20021
      bottom = 20019
      pos = {0, -523, 14}
      axistype = x
    mov44: Move | input = copy4; displx = 0; disply = 0; displz = -20000; indexattrtag = mov44.index
    dif6: Difference | input = uni40; input2 = mov44
    mov2004: Move "Move_Fascicle_4_y_80000_Elec1"
      input = dif6
      displx = 0
      disply = 80000
      displz = 0
      indexattrtag = mov2004.index
    mov6002: Move "Move_Fascicle_1_y_-20000_Elec1"
      input = mov2001
      displx = 0
      disply = -20000
      displz = 0
      indexattrtag = mov6002.index
    mov6003: Move "Move_Fascicle_2_y_-40000_Elec1"
      input = mov2002
      displx = 0
      disply = -40000
      displz = 0
      indexattrtag = mov6003.index
    mov6004: Move "Move_Fascicle_3_y_-60000_Elec1"
      input = mov2003
      displx = 0
      disply = -60000
      displz = 0
      indexattrtag = mov6004.index
    mov6005: Move "Move_Fascicle_4_y_-80000_Elec1"
      input = mov2004
      displx = 0
      disply = -80000
      displz = 0
      indexattrtag = mov6005.index
    cylsel8: CylinderSelection "Selec_boundary_fascicles with deformation_Elec1"
      entitydim = 2
      r = 10000
      top = Nerve_length_0-21
      bottom = 1
      axis = {1, 0, 0}
      axistype = cartesian
      condition = inside
    mov9: Move "Move_Emvironment_z_-400000_Elec1"
      input = mov8
      displx = 0
      disply = 0
      displz = -400000
      indexattrtag = mov9.index
    mov12: Move "Move_all_Hex and scar tissue_z_-20000_Elec1"
      input = rot1
      displx = 0
      disply = 0
      displz = -20000
      indexattrtag = mov12.index
    mov16: Move "Move_Nerve_z_-60000_Elec1"
      input = mov15
      displx = 0
      disply = 0
      displz = -60000
      indexattrtag = mov16.index
    cylsel10: CylinderSelection "Environment_ground_Elec1"
      entitydim = 2
      groupcontang = on
      angletol = 180
      r = 1
      top = 1
      bottom = -1
      pos = {0, Nerve_depth_0/2-2, Nerve_height_0/2-2}
      axistype = x
    cylsel11: CylinderSelection "Environment_insulated_Elec1"
      entitydim = 2
      r = 1
      top = Nerve_depth_0*2
      bottom = -Nerve_depth_0*2
      pos = {0, Nerve_depth_0/2-2000, Nerve_height_0/2-2000}
      axis = {1, 0, 0}
      axistype = cartesian
    difsel3: DifferenceSelection "Environment_ground_without two sides_Elec1"
      entitydim = 2
      add = {cylsel10}
      subtract = {cylsel11}
    cylsel9: CylinderSelection "Selec_all domain_Elec1"
      entitydim = 3
      r = 100000
      top = inf
      bottom = -inf
      pos = {0, Nerve_depth_0/2-2, Nerve_height_0/2-2}
      axis = {1, 0, 0}
      axistype = cartesian
    difsel2: DifferenceSelection "Ec_domain_Elec1" | entitydim = 3; add = {cylsel9}; subtract = {boxsel3}
    mov17: Move "Move_allFirstElectrode_z_900000_Elec1"
      input = mov12, mov16, mov9, mov6002, mov6003, mov6004, mov6005
      displx = Nerve_length_0*(1-1)
      disply = 0
      displz = 900000
      indexattrtag = mov17.index
    mov400000001: Move "Move all_z_-900000"
      input = mov17
      displx = 0
      disply = 0
      displz = -900000
      indexattrtag = mov400000001.index
    del1: Delete "Delete Entities 1"
      input = mov400000001(1) domains 1; mov400000001(3) domains 1; mov400000001(4) domains 1; mov400000001(5) domains 1; mov400000001(6) domains 1; mov400000001(7) domains 1; mov400000001(8) domains 1; mov400000001(9) domains 1; mov400000001(2) domains 1
    cyl15: Cylinder | r = 0.5[mm]; h = 0.1[mm]; pos = {9800-0.25[cm], -1000+2[mm], 500+1[mm]}; axistype = y
    cyl16: Cylinder | r = 0.5[mm]; h = 0.1[mm]; pos = {9800+0.25[cm], -1000+2[mm], 500+1[mm]}; axistype = y
    dif7: Difference (disabled) | input = mov400000001(11); input2 = cyl15, cyl16
    wp101: WorkPlane | quickplane = yz; quickx = 9800-0.25[cm]; unite = on
      ls1: LineSegment | specify1 = coord; coord1 = {-1800, 1500}; specify2 = coord; coord2 = {1000, 1500}
      ls2: LineSegment | specify1 = coord; coord1 = {-1800, 1500}; specify2 = coord; coord2 = {-1800, 20000}
      uni1: Union | input = ls1, ls2
      fil1: Fillet | point = uni1(1) points 1-3; radius = 700
    swe101: Sweep
      enttosweep = cyl15(1) boundaries 3; cyl16(1) boundaries 3
      crossfaces = on
      edge = wp101.fil1 edges 1-3
      manualdir = off
      includefinal = off
      diredge = wp101.fil1 edges 1
    cyl17: Cylinder (disabled) | r = 0.5[mm]; h = 2[mm]; pos = {9800-0.25[cm], -1000, 500+1[mm]}; axistype = y
    fin: Finalize "Form Union"
    cmf1: CompositeFaces "Form Composite Faces 1" | input = selection cylsel8
    cylsel400000001: CylinderSelection | entitydim = 3; r = Inf; axistype = x
    difsel400000001: DifferenceSelection | entitydim = 3; add = {cylsel400000001}; subtract = {boxsel3}

Materials
  mat2: Common "Pt - Platinum_Elec1" on domains 9, 10, 13, 14
    def: def "Basic"
      electricconductivity = 8.9e6[S/m]
      thermalexpansioncoefficient = 8.80e-6[1/K]
      heatcapacity = 133[J/(kg*K)]
      density = 21450[kg/m^3]
      thermalconductivity = 71.6[W/(m*K)]
    Enu: Enu "Young's modulus and Poisson's ratio"
      E = 168e9[Pa]
      nu = 0.38

Physics
  ec: ConductiveMedia "Electric Currents" on domains 1-6
    dependent variable V
    cucn1: CurrentConservationFluid "Current Conservation 1" (default)
    ein1: ElectricInsulation (default)
    init1: init "Initial Values 1" (default)
    cucn2: CurrentConservationFluid "Environment_Elec1" on all domains
      sigma_mat = userdef
      sigma = diag{sigma_envir_long_0, sigma_envir_tran_0, sigma_envir_tran_0}
      epsilonr_mat = userdef
      epsilonr = 1
    cucn1000: CurrentConservationFluid "Epineurium_Elec1" on selection geom1_cylsel5
      sigma_mat = userdef
      sigma = sigma_epi_0
      epsilonr_mat = userdef
      epsilonr = 1
    ci10: ContactImpedance "Perineurium_Fascicle_1_Elec1" on selection geom1_cylsel20
      ds = 1.036000e+01[um]
      sigmabnd_mat = userdef
      sigmabnd = sigma_per_0
      epsilonrbnd_mat = userdef
      epsilonrbnd = 1
    cucn210: CurrentConservationFluid "Endoneurial_Fascicle_1_Elec1" on selection geom1_cylsel21
      sigma_mat = userdef
      sigma = diag{sigma_end_long_0, sigma_end_tran_0, sigma_end_tran_0}
      epsilonr_mat = userdef
      epsilonr = 1
    ci20: ContactImpedance "Perineurium_Fascicle_2_Elec1" on selection geom1_cylsel40
      ds = 6.020000e+00[um]
      sigmabnd_mat = userdef
      sigmabnd = sigma_per_0
      epsilonrbnd_mat = userdef
      epsilonrbnd = 1
    cucn220: CurrentConservationFluid "Endoneurial_Fascicle_2_Elec1" on selection geom1_cylsel41
      sigma_mat = userdef
      sigma = diag{sigma_end_long_0, sigma_end_tran_0, sigma_end_tran_0}
      epsilonr_mat = userdef
      epsilonr = 1
    ci30: ContactImpedance "Perineurium_Fascicle_3_Elec1" on selection geom1_cylsel60
      ds = 4.600000e+00[um]
      sigmabnd_mat = userdef
      sigmabnd = sigma_per_0
      epsilonrbnd_mat = userdef
      epsilonrbnd = 1
    cucn230: CurrentConservationFluid "Endoneurial_Fascicle_3_Elec1" on selection geom1_cylsel61
      sigma_mat = userdef
      sigma = diag{sigma_end_long_0, sigma_end_tran_0, sigma_end_tran_0}
      epsilonr_mat = userdef
      epsilonr = 1
    ci40: ContactImpedance "Perineurium_Fascicle_4_Elec1" on selection geom1_cylsel80
      ds = 3.180000e+00[um]
      sigmabnd_mat = userdef
      sigmabnd = sigma_per_0
      epsilonrbnd_mat = userdef
      epsilonrbnd = 1
    cucn240: CurrentConservationFluid "Endoneurial_Fascicle_4_Elec1" on selection geom1_cylsel81
      sigma_mat = userdef
      sigma = diag{sigma_end_long_0, sigma_end_tran_0, sigma_end_tran_0}
      epsilonr_mat = userdef
      epsilonr = 1
    gnd1: Ground "Ground_Environment_Elec1" on selection geom1_difsel3
    ein2: ElectricInsulation "Electric Insulation_Nerve_1_Elec1" on selection geom1_cylsel6
    ein3: ElectricInsulation "Electric Insulation_Nerve_2_Elec1" on selection geom1_cylsel7
    gnd400000001: Ground "Return_electrode_1" on boundaries 94, 95, 97, 98, 105-108
    term400000001: Terminal "Active_electrode_1" on boundaries 37, 38, 40, 41, 48-51 | I0 = I_stim_0

Mesh
  mesh1 "Mesh 1"
    size: MeshSizeDefault | hmax = 400; hmin = 5; hgrad = 1.2; hauto = 1; custom = on
    ftet2: FreeTet "Free Tetrahedral 2" on remaining entities

Studies
  std1 "Study 1"
    stat: Stationary

Solver configurations
  sol1 "Solution 1" (study std1)
    v1: Variables "Dependent Variables 1"
    s1: Stationary "Stationary Solver 1"
      fc1: FullyCoupled
      i1: Iterative | linsolver = cg
        mg1: Multigrid | prefun = amg; coarseningmethod = classic
  sol2 "Solution 1 - Copy 1" (study std1)
  sol3 "Solution 1 - Copy 2" (study std1)

Datasets
  dset1: Solution | solution = sol1
  cpl1: CutPlane | data = dset1; quickplane = zx
  dset2: Solution | solution = sol2
  dset3: Solution | solution = sol3

Plots
  pg1: PlotGroup3D "Electric Potential (ec)" | data = dset1
    vol1: Volume | expr = V
  pg2: PlotGroup3D "Electric Field (ec)" | data = dset1
    mslc1: Multislice
      expr = ec.normE
      multiplanexmethod = coord
      xcoord = ec.CPx
      multiplaneymethod = coord
      ycoord = ec.CPy
      multiplanezmethod = coord
      zcoord = ec.CPz
    strmsl1: StreamlineMultislice
      expr = {ec.Ex, ec.Ey, ec.Ez}
      multiplanexmethod = coord
      xcoord = ec.CPx
      multiplaneymethod = coord
      ycoord = ec.CPy
      multiplanezmethod = coord
      zcoord = ec.CPz
      col1: Color "Color Expression 1" | expr = ec.normE
      filt1: Filter | expr = !isScalingSystemDomain
  pg3: PlotGroup2D "2D Plot Group 3" | data = cpl1
    surf1: Surface | expr = V

Exports
  data1: Data
    data = dset1
    expr = V
    unit = V
    descr = Electric potential
    filename = E:\Onedrive-UNSW\OneDrive - UNSW\PHD\2025\PART-2\代码\SENSE3_Tianruo\NerveModelGenerator\MultiElec\Data\Data_multiElec_50Hz_1\ComsolOutput\voltage_1.txt